ma 22 dec 2025 16:20:27 CET
;; 1. Based on: run03
;; 2. Description: PMX001 2CMT MM M7+
;; x1. Joshua I., Ali K.
;; 2025-12-22
$PROBLEM    PMX001 One Compartment
$INPUT      DUMMY=DROP ID TIME WEEK DOSE=DROP RATE CONC=DV ADA BW ALB
            SEX AGE CREAT COL EVID BLQ AMT
$DATA      dataset_clean.csv IGNORE=@
$SUBROUTINE ADVAN13 ; general nonlinear model
            TOL=9 ; tolerance for $DES,higher TOL: more accurate,but slower computation

; TOL=9 -> DES will aim for accuracy of 1E-9 for each integration step
$MODEL      NCOMP=2 ; number of compartments
            COMP=(DOSE,DEFDOSE,DEFOBS) ; first (central) compartment
            COMP=(PERIPH) ; second (peripheral) compartment
$PK
TVVMAX = THETA(1)
  VMAX = TVVMAX * EXP(ETA(1))
  TVKM = THETA(2)
    KM = TVKM * EXP(ETA(2))
  TVV1 = THETA(3)
    V1 = TVV1 * EXP(ETA(3))
  TVV2 = THETA(4)
    V2 = TVV2 * EXP(ETA(4))
   TVQ = THETA(5)
     Q = TVQ * EXP(ETA(5))
   K12 = Q/V1
   K21 = Q/V2
    S1 = V1 ; scale prediction based on DOSE (mmol) and DV (mmol/L)
    S2 = V2

$DES DADT(1) = -VMAX*A(1)/(KM*V1 +A(1)) -K12*A(1) +K21*A(2) ; ODE for central    compartment
     DADT(2) =                           K12*A(1) -K21*A(2) ; ODE for peripheral compartment

$ERROR
IPRED = F
LLOQ = 1

PROP = IPRED*THETA(6)
ADD = THETA(7)
IF (BLQ.EQ.1) ADD = ADD + LLOQ

W = SQRT(ADD**2+PROP**2)

IF (W.LE.0.000001) W=0.000001 ; Protective code

IRES=CONC-IPRED
IWRES=IRES/W

Y = IPRED + W*ERR(1)

$THETA  (0,0.75) ; VMAX [2]
 (0,0.04) ; KM [2]
 (0,3.23) ; V1 [5]
 (0,3.68) ; V2 [5]
 (0,0.02) ; Q  [5]
 (0,0.2,0.5) ; PROP error ()
 (0,0.2,10) ; ADD (mg/L)
$OMEGA  0.05  ;   IIV VMAX
 0.05  ;     IIV KM
 0.05  ; IIV V1 [5]
 0.05  ; IIV V2 [5]
$SIGMA  1  FIX  ; errors already adjusted under $ERROR as THETAs
 ; residual variability
$ESTIMATION METHOD=1 INTERACTION ; FOCE-I
            MAXEVAL=9999 SIG=3 PRINT=5
$COVARIANCE PRINT=E UNCONDITIONAL MATRIX=S
 ; output table for standard outcomes
$TABLE      ID TIME DV EVID PRED IPRED WRES IWRES RES IRES CWRES
            NOPRINT ONEHEADER FILE=run04_sdtab
 ; output table for PK parameters
$TABLE      ID VMAX KM V1 V2 Q K12 K21 NOPRINT NOAPPEND ONEHEADER
            FILE=run04_patab
 ; output table for categorical covariates
$TABLE      ID ADA SEX COL NOPRINT NOAPPEND ONEHEADER FILE=run04_catab
 ; output table for continuous covariates
$TABLE      ID BW ALB AGE CREAT NOPRINT NOAPPEND ONEHEADER
            FILE=run04_cotab
;; REFERENCES

;; 1] https://www.ncbi.nlm.nih.gov/books/NBK557889/

;; 2] https://www.tandfonline.com/doi/pdf/10.1080/19420862.2025.2512217?needAccess=true

;; 3] https://pmc.ncbi.nlm.nih.gov/articles/PMC8301575/

;; 4] https://ascpt.onlinelibrary.wiley.com/doi/abs/10.1016/j.clpt.2004.12.212

;; 5] https://accp1.onlinelibrary.wiley.com/doi/10.1177/0091270006298188

NM-TRAN MESSAGES
 WARNINGS AND ERRORS (IF ANY) FOR PROBLEM    1
 (WARNING  2) NM-TRAN INFERS THAT THE DATA ARE POPULATION.
 FOLLOWING ERROR PERTAINS TO ETAS      5 TO      5
 AN ERROR WAS FOUND IN THE CONTROL STATEMENTS.
  223  $OMEGA MUST INCLUDE VALUES FOR ALL ETA VARIABLES THAT ARE USED.
