di 09 dec 2025 15:44:56 CET
;; 1. Based on: run01
;; 2. Description: PMX001 Base Model Development
;; x1. Joshua Ijidakinro and Ali Kazim
;; 2025-11-12
$PROBLEM    PMX001 Base Model Development
$INPUT      DUMMY=DROP ID TIME WEEK DOSE=DROP RATE CONC=DV ADA BW ALB
            SEX AGE CREAT COL EVID AMT
;;
$DATA      dataset_clean.csv IGNORE=@
$SUBROUTINE ADVAN13 ; general nonlinear model
            TOL=9 ; tolerance for $DES,higher TOL: more accurate,but slower computation

; TOL=9 -> DES will aim for accuracy of 1E-9 for each integration step
$MODEL      NCOMP=1 ; number of compartments
            COMP=(DOSE,DEFDOSE,DEFOBS) ; first (central) compartment
$PK
TVCL = THETA(1)
  CL = TVCL * EXP(ETA(1))
 TVV = THETA(2)
   V = TVV  * EXP(ETA(2))
 K10 = CL/V
  S1 = V ; scale prediction based on DOSE (mmol) and DV (mmol/L)

$THETA  (0,0.012) ; ; L/h,CL value from adalimumab (1)
 (0,4.45) ; _; L,V value for adalimumab biosimilar (2,3)
$OMEGA  0.05  ; IIV/BSV CL, fix to 0 to exclude
 0.05  ; IIV/BSV VC, fix to 0 to exclude
$SIGMA  0.1  ; proportional error
 ; residual variability
$DES DADT(1) = -K10*A(1)  ; ODE for central compartment

$ERROR
IPRED = F
Y = IPRED + IPRED*ERR(1)
W = SQRT(IPRED**2*SIGMA(1,1)) ; new
IRES  = CONC - IPRED
IWRES = IRES / W

$ESTIMATION METHOD=1 INTERACTION ; FOCE-I
            MAXEVAL=9999 SIG=3 PRINT=5
$COVARIANCE PRINT=E UNCONDITIONAL MATRIX=S
 ;; output table for standard outcomes
$TABLE      ID TIME DV EVID PRED IPRED WRES IWRES RES IRES CWRES
            NOPRINT ONEHEADER FILE=run01_sdtab
 ;; output table for PK parameters
$TABLE      ID CL V K10 NOPRINT NOAPPEND ONEHEADER FILE=run01_patab
 ;; output table for categorical covariates
$TABLE      ID ADA SEX COL NOPRINT NOAPPEND ONEHEADER FILE=run01_catab
 ;; output table for continuous covariates
$TABLE      ID BW ALB AGE CREAT NOPRINT NOAPPEND ONEHEADER
            FILE=run01_cotab
;; REFERENCES

;; 1) https://www.ncbi.nlm.nih.gov/books/NBK557889/

;; 2) https://pmc.ncbi.nlm.nih.gov/articles/PMC8301575/

;; 3) https://ascpt.onlinelibrary.wiley.com/doi/abs/10.1016/j.clpt.2004.12.212

NM-TRAN MESSAGES
 WARNINGS AND ERRORS (IF ANY) FOR PROBLEM    1
 (WARNING  2) NM-TRAN INFERS THAT THE DATA ARE POPULATION.
 (WARNING  79) SIGMA IS USED ON THE RIGHT. WITH A SUBSEQUENT RUN, IF AN
 INITIAL ESTIMATE OF A DIAGONAL BLOCK OF SIGMA IS TO BE COMPUTED BY
 NONMEM, THAT BLOCK WILL BE SET TO AN IDENTITY MATRIX DURING THAT
 COMPUTATION. THIS COULD LEAD TO AN ARITHMETIC EXCEPTION.*
 * THE MAXIMUM NUMBER OF WARNINGS OF ONE OR MORE TYPES WAS REACHED.
 IT IS POSSIBLE THAT SOME WARNING MESSAGES WERE SUPPRESSED.
Note: Analytical 2nd Derivatives are constructed in FSUBS but are never used.
      You may insert $ABBR DERIV2=NO after the first $PROB to save FSUBS construction and compilation time

1NONLINEAR MIXED EFFECTS MODEL PROGRAM (NONMEM) VERSION 7.6.0 (nm760)
 ORIGINALLY DEVELOPED BY STUART BEAL, LEWIS SHEINER, AND ALISON BOECKMANN
 CURRENT DEVELOPERS ARE ROBERT BAUER, ICON DEVELOPMENT SOLUTIONS,
 AND ALISON BOECKMANN. IMPLEMENTATION, EFFICIENCY, AND STANDARDIZATION
 PERFORMED BY NOUS INFOSYSTEMS.
 PROBLEM NO.:         1
 PMX001 Base Model Development
 TOT. NO. OF OBS RECS:     2801
 TOT. NO. OF INDIVIDUALS:       75
 GENERAL NONLINEAR KINETICS MODEL WITH STIFF/NONSTIFF EQUATIONS (LSODA, ADVAN13)
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 #TBLN:      1
 #METH: First Order Conditional Estimation with Interaction
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
 #TERM:
0MINIMIZATION SUCCESSFUL
 HOWEVER, PROBLEMS OCCURRED WITH THE MINIMIZATION.
 REGARD THE RESULTS OF THE ESTIMATION STEP CAREFULLY, AND ACCEPT THEM ONLY
 AFTER CHECKING THAT THE COVARIANCE STEP PRODUCES REASONABLE OUTPUT.
 NO. OF FUNCTION EVALUATIONS USED:      393
 NO. OF SIG. DIGITS IN FINAL EST.:  3.7

 ETABAR IS THE ARITHMETIC MEAN OF THE ETA-ESTIMATES,
 AND THE P-VALUE IS GIVEN FOR THE NULL HYPOTHESIS THAT THE TRUE MEAN IS 0.

 ETABAR:        -4.3639E-04 -1.0068E-03
 SE:             7.9727E-02  5.8183E-02
 N:                      75          75

 P VAL.:         9.9563E-01  9.8619E-01

 ETASHRINKSD(%)  4.4654E-01  9.2732E-01
 ETASHRINKVR(%)  8.9108E-01  1.8460E+00
 EBVSHRINKSD(%)  4.3058E-01  9.7431E-01
 EBVSHRINKVR(%)  8.5930E-01  1.9391E+00
 RELATIVEINF(%)  9.9125E+01  9.8045E+01
 EPSSHRINKSD(%)  1.8424E+00
 EPSSHRINKVR(%)  3.6508E+00


 TOTAL DATA POINTS NORMALLY DISTRIBUTED (N):         2801
 N*LOG(2PI) CONSTANT TO OBJECTIVE FUNCTION:    5147.8936630125763
 OBJECTIVE FUNCTION VALUE WITHOUT CONSTANT:    12559.485711820413
 OBJECTIVE FUNCTION VALUE WITH CONSTANT:       17707.379374832988
 REPORTED OBJECTIVE FUNCTION DOES NOT CONTAIN CONSTANT

 TOTAL EFFECTIVE ETAS (NIND*NETA):                           150


 #TERE:
 Elapsed estimation  time in seconds:   547.66
 Elapsed covariance  time in seconds:    17.33
 Elapsed postprocess time in seconds:     2.52

 ********************               FIRST ORDER CONDITIONAL ESTIMATION WITH INTERACTION              ********************
 #OBJT:**************                       MINIMUM VALUE OF OBJECTIVE FUNCTION                      ********************
 #OBJV:********************************************         12559.486       *********************************************

 ********************               FIRST ORDER CONDITIONAL ESTIMATION WITH INTERACTION              ********************
 ********************                             FINAL PARAMETER ESTIMATE                           ********************

 THETA - VECTOR OF FIXED EFFECTS PARAMETERS   *********
         TH 1      TH 2
         1.22E+00  5.47E+00

 OMEGA - COV MATRIX FOR RANDOM EFFECTS - ETAS  ********
         ETA1      ETA2
 ETA1
+        4.81E-01
 ETA2
+        0.00E+00  2.59E-01

 SIGMA - COV MATRIX FOR RANDOM EFFECTS - EPSILONS  ****
         EPS1
 EPS1
+        2.12E-01

 OMEGA - CORR MATRIX FOR RANDOM EFFECTS - ETAS  *******
         ETA1      ETA2
 ETA1
+        6.94E-01
 ETA2
+        0.00E+00  5.09E-01

 SIGMA - CORR MATRIX FOR RANDOM EFFECTS - EPSILONS  ***
         EPS1
 EPS1
+        4.60E-01

 ********************               FIRST ORDER CONDITIONAL ESTIMATION WITH INTERACTION              ********************
 ********************                            STANDARD ERROR OF ESTIMATE                          ********************

 THETA - VECTOR OF FIXED EFFECTS PARAMETERS   *********
         TH 1      TH 2
         4.75E-01  1.47E+00

 OMEGA - COV MATRIX FOR RANDOM EFFECTS - ETAS  ********
         ETA1      ETA2
 ETA1
+        2.48E-01
 ETA2
+       .........  1.16E-01

 SIGMA - COV MATRIX FOR RANDOM EFFECTS - EPSILONS  ****
         EPS1
 EPS1
+        5.60E-03

 OMEGA - CORR MATRIX FOR RANDOM EFFECTS - ETAS  *******
         ETA1      ETA2
 ETA1
+        1.79E-01
 ETA2
+       .........  1.14E-01

 SIGMA - CORR MATRIX FOR RANDOM EFFECTS - EPSILONS  ***
         EPS1
 EPS1
+        6.08E-03

 ********************               FIRST ORDER CONDITIONAL ESTIMATION WITH INTERACTION              ********************
 ********************                          COVARIANCE MATRIX OF ESTIMATE                         ********************

            TH 1      TH 2      OM11      OM12      OM22      SG11
 TH 1
+        2.26E-01
 TH 2
+       -6.78E-01  2.16E+00
 OM11
+        9.25E-02 -2.72E-01  6.16E-02
 OM12
+       ......... ......... ......... .........
 OM22
+       -3.67E-02  1.10E-01 -2.50E-02 .........  1.33E-02
 SG11
+       -6.60E-04  2.54E-03 -4.54E-04 .........  1.45E-04  3.13E-05

 ********************               FIRST ORDER CONDITIONAL ESTIMATION WITH INTERACTION              ********************
 ********************                          CORRELATION MATRIX OF ESTIMATE                        ********************

            TH 1      TH 2      OM11      OM12      OM22      SG11
 TH 1
+        4.75E-01
 TH 2
+       -9.71E-01  1.47E+00
 OM11
+        7.84E-01 -7.47E-01  2.48E-01
 OM12
+       ......... ......... ......... .........
 OM22
+       -6.69E-01  6.47E-01 -8.73E-01 .........  1.16E-01
 SG11
+       -2.48E-01  3.09E-01 -3.27E-01 .........  2.24E-01  5.60E-03
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
 ********************               FIRST ORDER CONDITIONAL ESTIMATION WITH INTERACTION              ********************
 ********************                      EIGENVALUES OF COR MATRIX OF ESTIMATE                     ********************

             1         2         3         4         5
         2.28E-02  1.08E-01  5.13E-01  8.82E-01  3.47E+00
 Elapsed finaloutput time in seconds:     0.41
 #CPUT: Total CPU Time in Seconds,      568.977
