;; 1. Based on: run01
;; 2. Description: PMX001 1CMT LINEAR M7+
;; Joshua I., Ali K.
;; 2025-12-09

$PROBLEM PMX001 One Compartment

$INPUT DUMMY=DROP ID TIME WEEK DOSE=AMT RATE CONC=DROP ADA BW ALB SEX AGE CREAT COL EVID BLQ CONC_M7=DV

$DATA dataset_clean.csv IGNORE=@

$ABBR DERIV2=NO

$SUBROUTINES
ADVAN13 ; general nonlinear model
TOL=9   ; tolerance for $DES, higher TOL: more accurate, but slower computation
        ; TOL=9 -> DES will aim for accuracy of 1E-9 for each integration step

$MODEL
NCOMP=1                      ; number of compartments
COMP=(DOSE, DEFDOSE, DEFOBS) ; first (central) compartment

$PK
TVCL = THETA(1)
  CL = TVCL * EXP(ETA(1))
 TVV = THETA(2)
   V = TVV  * EXP(ETA(2))
 K10 = CL/V
  S1 = V ; scale prediction based on DOSE (mmol) and DV (mmol/L)

$THETA ; values are determined in 3 iterations
(0.001, 1.46, 8)    ; [1]   CL (L/d)
(0.001, 4.88, 10)   ; [2,3] V  (L)

$DES DADT(1) = -K10*A(1)  ; ODE for central compartment

$ERROR
IPRED = F
LLOQ = 1  ; (mg/L)

; --- Residual error SDs ---
PROP_SD = SIGMA(1)
ADD_SD  = SIGMA(2)

; --- BLQ inflation (gentle, stable) ---
IF (BLQ.EQ.1) ADD_SD = ADD_SD + LLOQ

; --- Final residual error ---
W = SQRT(ADD_SD**2+PROP_SD**2)

IF (W.LE.0.000001) W=0.000001 ; Protective code

IRES=DV-IPRED
IWRES=IRES/W
Y = IPRED * (1 + EPS(1)) + EPS(2)

$OMEGA
0.584 ; IIV CL
0.193 ; IIV V

$SIGMA ; residual variability
0.295    ; EPS(1), proportional
5E-13 FIX  ; EPS(2); additive, required by M7+ censoring method

$EST
METHOD=1 INTERACTION; FOCE-I
MAXEVAL=9999
SIG=3
SIGL=3
PRINT=5

$COVARIANCE PRINT=E UNCONDITIONAL MATRIX=S

$TABLE ; output table for standard outcomes
ID TIME DV EVID PRED IPRED WRES IWRES RES IRES CWRES NOPRINT ONEHEADER FILE=run01_sdtab

$TABLE ; output table for PK parameters
ID CL V K10 NOPRINT NOAPPEND ONEHEADER FILE=run01_patab

$TABLE ; output table for categorical covariates
ID ADA SEX COL NOPRINT NOAPPEND ONEHEADER FILE=run01_catab

$TABLE ; output table for continuous covariates
ID BW ALB AGE CREAT NOPRINT NOAPPEND ONEHEADER FILE=run01_cotab

;; REFERENCES
;; 1] https://www.ncbi.nlm.nih.gov/books/NBK557889/
;; 2] https://pmc.ncbi.nlm.nih.gov/articles/PMC8301575/
;; 3] https://ascpt.onlinelibrary.wiley.com/doi/abs/10.1016/j.clpt.2004.12.212
