vr 26 dec 2025 16:03:00 CET
;; 1. Based on: run03
;; 2. Description: PMX001 2CMT MM M7+
;; x1. Joshua I., Ali K.
;; 2025-12-22
$PROBLEM    PMX001 Two compartment MM M7+
$INPUT      DUMMY=DROP ID TIME WEEK DOSE=DROP RATE CONC=DV ADA BW ALB
            SEX AGE CREAT COL EVID BLQ AMT CONC_M7plus
$DATA      dataset_clean.csv IGNORE=@
$SUBROUTINE ADVAN13 ; general nonlinear model
            TOL=9 ; tolerance for $DES,higher TOL: more accurate,but slower computation

; TOL=9 -> DES will aim for accuracy of 1E-9 for each integration step
$MODEL      NCOMP=2 ; number of compartments
            COMP=(DOSE,DEFDOSE,DEFOBS) ; first (central) compartment
            COMP=(PERIPH) ; second (peripheral) compartment
$PK
TVVMAX = THETA(1)
  VMAX = TVVMAX * EXP(ETA(1))
  TVKM = THETA(2)
    KM = TVKM
  TVV1 = THETA(3)
    V1 = TVV1 * EXP(ETA(2))
  TVV2 = THETA(4)
    V2 = TVV2 * EXP(ETA(3))
   TVQ = THETA(5)
     Q = TVQ
   K12 = Q/V1
   K21 = Q/V2
    S1 = V1 ; scale prediction based on DOSE (mmol) and DV (mmol/L)
    S2 = V2

$THETA  (0,0.75) ; VMAX [2]
 (1E-9,0.04) ; KM [2]
 (0,3.23) ; V1 [5]
 (0,3.68) ; V2 [5]
 (0,0.02) ; Q  [5]
$DES DADT(1) = -VMAX*A(1)/(KM*V1 +A(1)) -K12*A(1) +K21*A(2) ; ODE for central    compartment
     DADT(2) =                           K12*A(1) -K21*A(2) ; ODE for peripheral compartment

$ERROR
OBS = CONC_M7plus

IPRED = F
LLOQ = 1      ; mg/L

Y = IPRED + IPRED*ERR(1) + ERR(2)
W = SQRT(IPRED**2*SIGMA(1,1) + SIGMA(2,2))
IRES  = OBS - IPRED
IWRES = IRES / W

$OMEGA  0.05  ;   IIV VMAX
 0.05  ; IIV V1 [5]
 0.05  ; IIV V2 [5]
;0.05     ; IIV KM, high shrinkage
;0.0005   ; IIV Q
$SIGMA  0.1  ;     ERR(1)  ; EPS(1), proportional
 0.05  ;     ERR(2)  ; additive, required by M7+ censoring method
 ; residual variability
$ESTIMATION METHOD=1 INTERACTION ; FOCE-I
            MAXEVAL=9999 SIG=3 PRINT=5
$COVARIANCE PRINT=E UNCONDITIONAL MATRIX=S
 ; output table for standard outcomes
$TABLE      ID TIME DV EVID PRED IPRED WRES IWRES RES IRES CWRES
            NOPRINT ONEHEADER FILE=run04_sdtab
 ; output table for PK parameters
$TABLE      ID VMAX KM V1 V2 Q K12 K21 NOPRINT NOAPPEND ONEHEADER
            FILE=run04_patab
 ; output table for categorical covariates
$TABLE      ID ADA SEX COL NOPRINT NOAPPEND ONEHEADER FILE=run04_catab
 ; output table for continuous covariates
$TABLE      ID BW ALB AGE CREAT NOPRINT NOAPPEND ONEHEADER
            FILE=run04_cotab
;; REFERENCES

;; 1] https://www.ncbi.nlm.nih.gov/books/NBK557889/

;; 2] https://www.tandfonline.com/doi/pdf/10.1080/19420862.2025.2512217?needAccess=true

;; 3] https://pmc.ncbi.nlm.nih.gov/articles/PMC8301575/

;; 4] https://ascpt.onlinelibrary.wiley.com/doi/abs/10.1016/j.clpt.2004.12.212

;; 5] https://accp1.onlinelibrary.wiley.com/doi/10.1177/0091270006298188

NM-TRAN MESSAGES
 WARNINGS AND ERRORS (IF ANY) FOR PROBLEM    1
 (WARNING  2) NM-TRAN INFERS THAT THE DATA ARE POPULATION.
 (WARNING  79) SIGMA IS USED ON THE RIGHT. WITH A SUBSEQUENT RUN, IF AN
 INITIAL ESTIMATE OF A DIAGONAL BLOCK OF SIGMA IS TO BE COMPUTED BY
 NONMEM, THAT BLOCK WILL BE SET TO AN IDENTITY MATRIX DURING THAT
 COMPUTATION. THIS COULD LEAD TO AN ARITHMETIC EXCEPTION.*
 * THE MAXIMUM NUMBER OF WARNINGS OF ONE OR MORE TYPES WAS REACHED.
 IT IS POSSIBLE THAT SOME WARNING MESSAGES WERE SUPPRESSED.
Note: Analytical 2nd Derivatives are constructed in FSUBS but are never used.
      You may insert $ABBR DERIV2=NO after the first $PROB to save FSUBS construction and compilation time

1NONLINEAR MIXED EFFECTS MODEL PROGRAM (NONMEM) VERSION 7.6.0 (nm760)
 ORIGINALLY DEVELOPED BY STUART BEAL, LEWIS SHEINER, AND ALISON BOECKMANN
 CURRENT DEVELOPERS ARE ROBERT BAUER, ICON DEVELOPMENT SOLUTIONS,
 AND ALISON BOECKMANN. IMPLEMENTATION, EFFICIENCY, AND STANDARDIZATION
 PERFORMED BY NOUS INFOSYSTEMS.
 PROBLEM NO.:         1
 PMX001 Two compartment MM M7+
 TOT. NO. OF OBS RECS:     2801
 TOT. NO. OF INDIVIDUALS:       75
 GENERAL NONLINEAR KINETICS MODEL WITH STIFF/NONSTIFF EQUATIONS (LSODA, ADVAN13)
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 #TBLN:      1
 #METH: First Order Conditional Estimation with Interaction
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
0PRED EXIT CODE = 1
0INDIVIDUAL NO.       8   ID= 8.00000000000000E+00   (WITHIN-INDIVIDUAL) DATA REC NO. 140
 THETA=
  4.23E+01   1.52E-02   2.38E+01   6.85E+00   2.81E+00
 ETA=
 -1.61E+00  -9.91E+00  -2.18E-02
 OCCURS DURING SEARCH FOR ETA AT A NONZERO VALUE OF ETA
 ERROR IN LSODA: CODE  -1
0PROGRAM TERMINATED BY OBJ
 MESSAGE ISSUED FROM ESTIMATION STEP

 #TERM:

 TOTAL DATA POINTS NORMALLY DISTRIBUTED (N):          266
 N*LOG(2PI) CONSTANT TO OBJECTIVE FUNCTION:    488.87529966488586
 OBJECTIVE FUNCTION VALUE WITHOUT CONSTANT:    16964.836821830388
 OBJECTIVE FUNCTION VALUE WITH CONSTANT:       17453.712121495275
 REPORTED OBJECTIVE FUNCTION DOES NOT CONTAIN CONSTANT

 TOTAL EFFECTIVE ETAS (NIND*NETA):                            21


 #TERE:
 Elapsed estimation  time in seconds:  2037.58
 #CPUT: Total CPU Time in Seconds,     2026.764
