ma 29 dec 2025 15:04:30 CET
;; 1. Based on: run01
;; 2. Description: PMX001 1CMT LIN+MM M7+
;; Joshua I., Ali K.
;; 2025-12-29
$PROBLEM    PMX001 One Compartment IV infusion with linear +
;           Michaelis–Menten eliminations
$INPUT      DUMMY=DROP ID TIME WEEK DOSE=DROP RATE CONC=DV ADA BW ALB
            SEX AGE CREAT COL EVID BLQ AMT CONC_M7plus=DROP
$ABBREVIATED DERIV2=NO
$DATA      dataset_clean.csv IGNORE=@
$SUBROUTINE ADVAN13 ; general nonlinear model
            TOL=9 ; tolerance for $DES,higher TOL: more accurate,but slower computation

; TOL=9 -> DES will aim for accuracy of 1E-9 for each integration step
$MODEL      NCOMP=1 ; number of compartments
            COMP=(DOSE,DEFDOSE,DEFOBS) ; first (central) compartment
$PK
; Typical (population) parameters
TVCL   = THETA(1)   ; Linear clearance [L/h]
TVV    = THETA(2)   ; Central volume [L]
TVVMAX = THETA(3)   ; Vmax for MM elimination [amount/h]
TVKM   = THETA(4)   ; Km for MM elimination [conc units, e.g., mg/L]

; Individual parameters
CL   = TVCL  * EXP(ETA(1))
V    = TVV   * EXP(ETA(2))
VMAX = TVVMAX
KM   = TVKM

K  = CL/V

; Scaling
S1 = V

$THETA  (0.1,1.5,3) ; [1] TVCL (L/h)
 (1.0,4.86,10) ; [2] TVV  (L)
 (0.01,0.5,2) ; [3] VMAX (mg/h)
 (0.1,1.2,10) ; [4] KM   (mg/L)
; values were iteratively determined
$OMEGA  0.6  ;     IIV CL
 0.2  ;      IIV V
; values were iteratively determined
$SIGMA  0.1  ; proportional error
 0.00005  ; additional error
  ; residual variability
$DES ; ODE for 1CMT with combined elimination
DADT(1) = - (VMAX*A(1)) / (KM*V + A(1)) - K*A(1)

$ERROR
IPRED = F
LLOQ = 1  ; (mg/L)

; --- Residual error SDs ---
PROP_SD = SIGMA(1)
ADD_SD  = SIGMA(2)

; --- BLQ inflation (gentle, stable) ---
IF (BLQ.EQ.1) ADD_SD = ADD_SD + LLOQ

; --- Final residual error ---
W = SQRT(ADD_SD**2+PROP_SD**2)

IF (W.LE.0.000001) W=0.000001 ; Protective code

IRES=CONC-IPRED
IWRES=IRES/W
Y = IPRED * (1 + EPS(1)) + EPS(2)

$ESTIMATION METHOD=1 INTERACTION ; FOCE-I
            MAXEVAL=9999 SIG=3 PRINT=5
$COVARIANCE PRINT=E UNCONDITIONAL MATRIX=S
 ; output table for standard outcomes
$TABLE      ID TIME DV EVID PRED IPRED WRES RES CWRES NOPRINT
            ONEHEADER FILE=run05_sdtab
 ; output table for PK parameters
$TABLE      ID CL V K NOPRINT NOAPPEND ONEHEADER FILE=run05_patab
 ; output table for categorical covariates
$TABLE      ID ADA SEX COL NOPRINT NOAPPEND ONEHEADER FILE=run05_catab
 ; output table for continuous covariates
$TABLE      ID BW ALB AGE CREAT NOPRINT NOAPPEND ONEHEADER
            FILE=run05_cotab
;; REFERENCES

;; 1) https://www.ncbi.nlm.nih.gov/books/NBK557889/

;; 2) https://pmc.ncbi.nlm.nih.gov/articles/PMC8301575/

;; 3)https://ascpt.onlinelibrary.wiley.com/doi/abs/10.1016/j.clpt.2004.12.212

NM-TRAN MESSAGES
 WARNINGS AND ERRORS (IF ANY) FOR PROBLEM    1
 (WARNING  2) NM-TRAN INFERS THAT THE DATA ARE POPULATION.
 (WARNING  79) SIGMA IS USED ON THE RIGHT. WITH A SUBSEQUENT RUN, IF AN
 INITIAL ESTIMATE OF A DIAGONAL BLOCK OF SIGMA IS TO BE COMPUTED BY
 NONMEM, THAT BLOCK WILL BE SET TO AN IDENTITY MATRIX DURING THAT
 COMPUTATION. THIS COULD LEAD TO AN ARITHMETIC EXCEPTION.*
 * THE MAXIMUM NUMBER OF WARNINGS OF ONE OR MORE TYPES WAS REACHED.
 IT IS POSSIBLE THAT SOME WARNING MESSAGES WERE SUPPRESSED.

1NONLINEAR MIXED EFFECTS MODEL PROGRAM (NONMEM) VERSION 7.6.0 (nm760)
 ORIGINALLY DEVELOPED BY STUART BEAL, LEWIS SHEINER, AND ALISON BOECKMANN
 CURRENT DEVELOPERS ARE ROBERT BAUER, ICON DEVELOPMENT SOLUTIONS,
 AND ALISON BOECKMANN. IMPLEMENTATION, EFFICIENCY, AND STANDARDIZATION
 PERFORMED BY NOUS INFOSYSTEMS.
 PROBLEM NO.:         1
 PMX001 One Compartment IV infusion with linear +
 TOT. NO. OF OBS RECS:     2801
 TOT. NO. OF INDIVIDUALS:       75
 GENERAL NONLINEAR KINETICS MODEL WITH STIFF/NONSTIFF EQUATIONS (LSODA, ADVAN13)
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 #TBLN:      1
 #METH: First Order Conditional Estimation with Interaction
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
 #TERM:
0MINIMIZATION SUCCESSFUL
 NO. OF FUNCTION EVALUATIONS USED:      318
 NO. OF SIG. DIGITS IN FINAL EST.:  3.1

 ETABAR IS THE ARITHMETIC MEAN OF THE ETA-ESTIMATES,
 AND THE P-VALUE IS GIVEN FOR THE NULL HYPOTHESIS THAT THE TRUE MEAN IS 0.

 ETABAR:        -2.1880E-04 -4.8875E-04
 SE:             9.0303E-02  5.3336E-02
 N:                      75          75

 P VAL.:         9.9807E-01  9.9269E-01

 ETASHRINKSD(%)  2.3664E-01  8.3174E-01
 ETASHRINKVR(%)  4.7271E-01  1.6566E+00
 EBVSHRINKSD(%)  2.4594E-01  8.4065E-01
 EBVSHRINKVR(%)  4.9128E-01  1.6742E+00
 RELATIVEINF(%)  9.9502E+01  9.8319E+01
 EPSSHRINKSD(%)  2.1942E+00  2.1942E+00
 EPSSHRINKVR(%)  4.3402E+00  4.3402E+00


 TOTAL DATA POINTS NORMALLY DISTRIBUTED (N):         2801
 N*LOG(2PI) CONSTANT TO OBJECTIVE FUNCTION:    5147.8936630125763
 OBJECTIVE FUNCTION VALUE WITHOUT CONSTANT:    12441.579092197613
 OBJECTIVE FUNCTION VALUE WITH CONSTANT:       17589.472755210190
 REPORTED OBJECTIVE FUNCTION DOES NOT CONTAIN CONSTANT

 TOTAL EFFECTIVE ETAS (NIND*NETA):                           150


 #TERE:
 Elapsed estimation  time in seconds:   212.89
 Elapsed covariance  time in seconds:    22.53
 Elapsed postprocess time in seconds:     1.89

 ********************               FIRST ORDER CONDITIONAL ESTIMATION WITH INTERACTION              ********************
 #OBJT:**************                       MINIMUM VALUE OF OBJECTIVE FUNCTION                      ********************
 #OBJV:********************************************         12441.579       *********************************************

 ********************               FIRST ORDER CONDITIONAL ESTIMATION WITH INTERACTION              ********************
 ********************                             FINAL PARAMETER ESTIMATE                           ********************

 THETA - VECTOR OF FIXED EFFECTS PARAMETERS   *********
         TH 1      TH 2      TH 3      TH 4
         1.19E+00  4.95E+00  9.77E-01  3.65E+00

 OMEGA - COV MATRIX FOR RANDOM EFFECTS - ETAS  ********
         ETA1      ETA2
 ETA1
+        6.15E-01
 ETA2
+        0.00E+00  2.17E-01

 SIGMA - COV MATRIX FOR RANDOM EFFECTS - EPSILONS  ****
         EPS1      EPS2
 EPS1
+        1.23E-01
 EPS2
+        0.00E+00  2.80E-06

 OMEGA - CORR MATRIX FOR RANDOM EFFECTS - ETAS  *******
         ETA1      ETA2
 ETA1
+        7.84E-01
 ETA2
+        0.00E+00  4.66E-01

 SIGMA - CORR MATRIX FOR RANDOM EFFECTS - EPSILONS  ***
         EPS1      EPS2
 EPS1
+        3.51E-01
 EPS2
+        0.00E+00  1.67E-03

 ********************               FIRST ORDER CONDITIONAL ESTIMATION WITH INTERACTION              ********************
 ********************                            STANDARD ERROR OF ESTIMATE                          ********************

 THETA - VECTOR OF FIXED EFFECTS PARAMETERS   *********
         TH 1      TH 2      TH 3      TH 4
         4.15E-01  1.05E+00  3.37E-01  1.22E+00

 OMEGA - COV MATRIX FOR RANDOM EFFECTS - ETAS  ********
         ETA1      ETA2
 ETA1
+        2.70E-01
 ETA2
+       .........  1.03E-01

 SIGMA - COV MATRIX FOR RANDOM EFFECTS - EPSILONS  ****
         EPS1      EPS2
 EPS1
+        3.61E-03
 EPS2
+       .........  1.40E-07

 OMEGA - CORR MATRIX FOR RANDOM EFFECTS - ETAS  *******
         ETA1      ETA2
 ETA1
+        1.73E-01
 ETA2
+       .........  1.10E-01

 SIGMA - CORR MATRIX FOR RANDOM EFFECTS - EPSILONS  ***
         EPS1      EPS2
 EPS1
+        5.15E-03
 EPS2
+       .........  4.19E-05

 ********************               FIRST ORDER CONDITIONAL ESTIMATION WITH INTERACTION              ********************
 ********************                          COVARIANCE MATRIX OF ESTIMATE                         ********************

            TH 1      TH 2      TH 3      TH 4      OM11      OM12      OM22      SG11      SG12      SG22
 TH 1
+        1.72E-01
 TH 2
+       -3.88E-01  1.11E+00
 TH 3
+        4.98E-03 -9.49E-02  1.13E-01
 TH 4
+       -3.96E-02 -1.98E-01  4.04E-01  1.48E+00
 OM11
+       -4.00E-02  1.26E-01 -1.41E-02 -1.80E-02  7.32E-02
 OM12
+       ......... ......... ......... ......... ......... .........
 OM22
+        1.25E-02 -5.18E-02  1.47E-02  4.25E-02 -2.14E-02 .........  1.06E-02
 SG11
+        3.08E-04  5.08E-04 -2.71E-04 -1.03E-03 -2.65E-05 ......... -1.24E-04  1.31E-05
 SG12
+       ......... ......... ......... ......... ......... ......... ......... ......... .........
 SG22
+       -2.10E-08  6.58E-08 -5.13E-09 -1.21E-08  6.57E-09 ......... -2.63E-09  7.75E-11 .........  1.97E-14

 ********************               FIRST ORDER CONDITIONAL ESTIMATION WITH INTERACTION              ********************
 ********************                          CORRELATION MATRIX OF ESTIMATE                        ********************

            TH 1      TH 2      TH 3      TH 4      OM11      OM12      OM22      SG11      SG12      SG22
 TH 1
+        4.15E-01
 TH 2
+       -8.88E-01  1.05E+00
 TH 3
+        3.57E-02 -2.68E-01  3.37E-01
 TH 4
+       -7.86E-02 -1.55E-01  9.88E-01  1.22E+00
 OM11
+       -3.57E-01  4.42E-01 -1.55E-01 -5.49E-02  2.70E-01
 OM12
+       ......... ......... ......... ......... ......... .........
 OM22
+        2.94E-01 -4.79E-01  4.24E-01  3.41E-01 -7.71E-01 .........  1.03E-01
 SG11
+        2.06E-01  1.34E-01 -2.23E-01 -2.35E-01 -2.72E-02 ......... -3.34E-01  3.61E-03
 SG12
+       ......... ......... ......... ......... ......... ......... ......... ......... .........
 SG22
+       -3.61E-01  4.45E-01 -1.09E-01 -7.06E-02  1.73E-01 ......... -1.82E-01  1.53E-01 .........  1.40E-07
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
 ********************               FIRST ORDER CONDITIONAL ESTIMATION WITH INTERACTION              ********************
 ********************                      EIGENVALUES OF COR MATRIX OF ESTIMATE                     ********************

             1         2         3         4         5         6         7         8
         2.87E-03  3.15E-02  1.33E-01  6.17E-01  1.02E+00  1.09E+00  1.99E+00  3.11E+00
 Elapsed finaloutput time in seconds:     0.29
 #CPUT: Total CPU Time in Seconds,      238.359
