vr 02 jan 2026 19:57:59 CET
;; 1. Based on: run02
;; 2. Description: PMX001 2CMT LINEAR M7+ (COV MODEL)
;; Joshua I., Ali K.
;; 2025-12-29
$PROBLEM    PMX001 Two Compartment
$INPUT      DUMMY=DROP ID TIME WEEK DOSE=AMT RATE CONC=DROP ADA BW ALB
            SEX AGE CREAT COL EVID BLQ CONC_M7=DV
$DATA      dataset_clean.csv IGNORE=@
$ABBREVIATED DERIV2=NO
$SUBROUTINE ADVAN13 ; general nonlinear model
            TOL=9 ; tolerance for $DES,higher TOL: more accurate,but slower computation

; TOL=9 -> DES will aim for accuracy of 1E-9 for each integration step
$MODEL      NCOMP=2 ; number of compartments
            COMP=(DOSE,DEFDOSE,DEFOBS) ; first (central) compartment
            COMP=(PERIPH) ; second (peripheral) compartment
$PK
;; time after last dose
IF (EVID.EQ.1) LASTDOSE = TIME
TAD = TIME - LASTDOSE

;; typical values
 TVCL = THETA(1)
 TVV1 = THETA(2)
 TVV2 = THETA(3)
  TVQ = THETA(4)

;; covariate determined from SCM+ based on base model
IF(ADA.EQ.0) CLADA = 1               ; Most common
IF(ADA.EQ.1) CLADA = ( 1 + THETA(5))
CLCOV = CLADA

;; individual values
   CL = TVCL * EXP(ETA(1)) * CLCOV
   V1 = TVV1 * EXP(ETA(2))
   V2 = TVV2
    Q = TVQ

;; derived parameters
  K10 = CL/V1
  K12 = Q/V1
  K21 = Q/V2

;; scaling factors
   S1 = V1/1 ; scale prediction based on DOSE (mmol) and CONC (mmol/L)
   S2 = V2/1

$THETA  (0.01,1.32,3) ; [1]   TVCL (L/h)
 (0.01,4.68,8) ; [2,3] TVV1 (L)
 (0.01,0.226,1) ; V2
 (0.001,0.0546,1.5) ; Q
 (-1,0.466,5) ; CLADA
 ; values are determined in 3 iterations
$DES DADT(1) = -K10*A(1) -K12*A(1) +K21*A(2) ; ODE for central    compartment
     DADT(2) =            K12*A(1) -K21*A(2) ; ODE for peripheral compartment

$ERROR
IPRED = F
LLOQ = 1  ; (mg/L)

; --- Residual error SDs ---
PROP_SD = SIGMA(1)
ADD_SD  = SIGMA(2)

; --- BLQ inflation (gentle, stable) ---
IF (BLQ.EQ.1) ADD_SD = ADD_SD + LLOQ

; --- Final residual error ---
W = SQRT(ADD_SD**2+PROP_SD**2)

IF (W.LE.0.000001) W=0.000001 ; Protective code

IRES=DV-IPRED
IWRES=IRES/W
Y = IPRED * (1 + EPS(1)) + EPS(2)

$OMEGA  0.539  ;     IIV CL
 0.235  ;      IIV V
 ; interindividual variability
$SIGMA  0.131  ; EPS(1), proportional
 0.000000005  FIX  ;     EPS(2)  ; additive, required by M7+ censoring method
          ; residual variability
$ESTIMATION METHOD=1 INTERACTION ; FOCE-I
            MAXEVAL=9999 SIG=3 PRINT=5
$COVARIANCE PRINT=E UNCONDITIONAL MATRIX=S
 ; output table
$TABLE      ID TIME TAD DV EVID PRED IPRED WRES IWRES RES IRES CWRES
            CL V1 V2 Q K10 K12 K21 ADA SEX COL BW ALB AGE CREAT
            NOPRINT ONEHEADER FILE=run06
;; REFERENCES

;; 1) https://www.ncbi.nlm.nih.gov/books/NBK557889/

;; 2) https://pmc.ncbi.nlm.nih.gov/articles/PMC8301575/

;; 3) https://ascpt.onlinelibrary.wiley.com/doi/abs/10.1016/j.clpt.2004.12.212

NM-TRAN MESSAGES
 WARNINGS AND ERRORS (IF ANY) FOR PROBLEM    1
 (WARNING  2) NM-TRAN INFERS THAT THE DATA ARE POPULATION.
 (WARNING  79) SIGMA IS USED ON THE RIGHT. WITH A SUBSEQUENT RUN, IF AN
 INITIAL ESTIMATE OF A DIAGONAL BLOCK OF SIGMA IS TO BE COMPUTED BY
 NONMEM, THAT BLOCK WILL BE SET TO AN IDENTITY MATRIX DURING THAT
 COMPUTATION. THIS COULD LEAD TO AN ARITHMETIC EXCEPTION.*
 * THE MAXIMUM NUMBER OF WARNINGS OF ONE OR MORE TYPES WAS REACHED.
 IT IS POSSIBLE THAT SOME WARNING MESSAGES WERE SUPPRESSED.

1NONLINEAR MIXED EFFECTS MODEL PROGRAM (NONMEM) VERSION 7.6.0 (nm760)
 ORIGINALLY DEVELOPED BY STUART BEAL, LEWIS SHEINER, AND ALISON BOECKMANN
 CURRENT DEVELOPERS ARE ROBERT BAUER, ICON DEVELOPMENT SOLUTIONS,
 AND ALISON BOECKMANN. IMPLEMENTATION, EFFICIENCY, AND STANDARDIZATION
 PERFORMED BY NOUS INFOSYSTEMS.
 PROBLEM NO.:         1
 PMX001 Two Compartment
 TOT. NO. OF OBS RECS:     2801
 TOT. NO. OF INDIVIDUALS:       75
 GENERAL NONLINEAR KINETICS MODEL WITH STIFF/NONSTIFF EQUATIONS (LSODA, ADVAN13)
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 #TBLN:      1
 #METH: First Order Conditional Estimation with Interaction
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
 #TERM:
0MINIMIZATION TERMINATED
 DUE TO ROUNDING ERRORS (ERROR=134)
 NO. OF FUNCTION EVALUATIONS USED:      291
 NO. OF SIG. DIGITS UNREPORTABLE
0PARAMETER ESTIMATE IS NEAR ITS BOUNDARY

 ETABAR IS THE ARITHMETIC MEAN OF THE ETA-ESTIMATES,
 AND THE P-VALUE IS GIVEN FOR THE NULL HYPOTHESIS THAT THE TRUE MEAN IS 0.

 ETABAR:         4.0321E-04 -6.0210E-04
 SE:             8.6502E-02  5.5390E-02
 N:                      75          75

 P VAL.:         9.9628E-01  9.9133E-01

 ETASHRINKSD(%)  3.9238E-01  1.5915E+00
 ETASHRINKVR(%)  7.8321E-01  3.1576E+00
 EBVSHRINKSD(%)  3.8319E-01  1.5085E+00
 EBVSHRINKVR(%)  7.6492E-01  2.9943E+00
 RELATIVEINF(%)  9.9215E+01  9.6986E+01
 EPSSHRINKSD(%)  4.2467E+00  4.2467E+00
 EPSSHRINKVR(%)  8.3131E+00  8.3131E+00


 TOTAL DATA POINTS NORMALLY DISTRIBUTED (N):         2801
 N*LOG(2PI) CONSTANT TO OBJECTIVE FUNCTION:    5147.8936630125763
 OBJECTIVE FUNCTION VALUE WITHOUT CONSTANT:    12032.491077999426
 OBJECTIVE FUNCTION VALUE WITH CONSTANT:       17180.384741012003
 REPORTED OBJECTIVE FUNCTION DOES NOT CONTAIN CONSTANT

 TOTAL EFFECTIVE ETAS (NIND*NETA):                           150


 #TERE:
 Elapsed estimation  time in seconds:   448.98
0S MATRIX ALGORITHMICALLY SINGULAR
0COVARIANCE MATRIX UNOBTAINABLE
 Elapsed covariance  time in seconds:    51.90
 Elapsed postprocess time in seconds:     3.95

 ********************               FIRST ORDER CONDITIONAL ESTIMATION WITH INTERACTION              ********************
 #OBJT:**************                       MINIMUM VALUE OF OBJECTIVE FUNCTION                      ********************
 #OBJV:********************************************         12032.491       *********************************************

 ********************               FIRST ORDER CONDITIONAL ESTIMATION WITH INTERACTION              ********************
 ********************                             FINAL PARAMETER ESTIMATE                           ********************

 THETA - VECTOR OF FIXED EFFECTS PARAMETERS   *********
         TH 1      TH 2      TH 3      TH 4      TH 5
         1.44E+00  4.68E+00  4.56E-01  1.49E+00  3.28E+00

 OMEGA - COV MATRIX FOR RANDOM EFFECTS - ETAS  ********
         ETA1      ETA2
 ETA1
+        5.66E-01
 ETA2
+        0.00E+00  2.38E-01

 SIGMA - COV MATRIX FOR RANDOM EFFECTS - EPSILONS  ****
         EPS1      EPS2
 EPS1
+        2.38E-01
 EPS2
+        0.00E+00  5.00E-09

 OMEGA - CORR MATRIX FOR RANDOM EFFECTS - ETAS  *******
         ETA1      ETA2
 ETA1
+        7.52E-01
 ETA2
+        0.00E+00  4.87E-01

 SIGMA - CORR MATRIX FOR RANDOM EFFECTS - EPSILONS  ***
         EPS1      EPS2
 EPS1
+        4.88E-01
 EPS2
+        0.00E+00  7.07E-05
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 Elapsed finaloutput time in seconds:     0.26
 #CPUT: Total CPU Time in Seconds,      507.000
