do 08 jan 2026 22:01:54 CET
;; 1. Based on: run09
;; 2. Description: PMX001 2CMT LINEAR M7+ (FINAL MODEL)
;; Joshua I., Ali K.
;; 2025-12-09
$PROBLEM    PMX001 Two Compartment
$INPUT      DUMMY=DROP ID TIME WEEK DOSE=AMT RATE CONC=DROP ADA BW ALB
            SEX AGE CREAT COL EVID BLQ CONC_M7=DV
$DATA      dataset_clean.csv IGNORE=@
$ABBREVIATED DERIV2=NO
$SUBROUTINE ADVAN13 ; general nonlinear model
            TOL=5 ; tolerance for $DES,higher TOL: more accurate,but slower computation
$MODEL      NCOMP=3 ; number of compartments
            COMP=(DOSE,DEFDOSE,DEFOBS) ; first (central) compartment
            COMP=(PERIPH) ; second (peripheral) compartment
            COMP=(AUC) ; continuous AUC integration
$PK
IF (EVID.EQ.1) LASTDOSE = TIME
TAD = TIME - LASTDOSE

TVCL = THETA(1)
TVV1 = THETA(2)
TVV2 = THETA(3)
 TVQ = THETA(4)

IF(ADA.EQ.0) CLADA = 1  ; Most common
IF(ADA.EQ.1) CLADA = ( 1 + THETA(5))
V1ALB = ( 1 + THETA(6)*(ALB - 31.84))

  CL = TVCL * EXP(ETA(1)) * CLADA
  V1 = TVV1 * EXP(ETA(2)) * V1ALB
  V2 = TVV2
   Q = TVQ

 K10 = CL/V1
 K12 = Q/V1
 K21 = Q/V2

  S1 = V1/1 ; scale prediction based on DOSE (mmol) and DV (mmol/L)
  S2 = V2/1

$THETA  (0.001,1.41,3) ; [1]   CL (L/d)
 (0.001,4.73,7) ; [2,3] V1  (L)
 (0.01,0.231,0.8) ; V2
 (0.001,2.15,5) ; Q
 (0.001,5.78,8) ; CLADA
 (-0.140,-0.127,-0.001) ; V1ALB1
 ; values are determined in 3 iterations
$DES DADT(1) = -K10*A(1) -K12*A(1) +K21*A(2) ; ODE for central    compartment
     DADT(2) =            K12*A(1) -K21*A(2) ; ODE for peripheral compartment
        cAUC = A(1)/V1                       ; calculates cumulative AUC
     DADT(3) = cAUC                          ; continuous AUC integration

$ERROR
IPRED = F
LLOQ = 1  ; (mg/L)

; --- Residual error SDs ---
PROP_SD = SIGMA(1)
ADD_SD  = SIGMA(2)

; --- BLQ inflation (gentle, stable) ---
IF (BLQ.EQ.1) ADD_SD = ADD_SD + LLOQ

; --- Final residual error ---
W = SQRT(ADD_SD**2+PROP_SD**2)

IF (W.LE.0.000001) W=0.000001 ; Protective code

IRES=DV-IPRED
IWRES=IRES/W
Y = IPRED * (1 + EPS(1)) + EPS(2)

$OMEGA  0.608  ;     IIV CL
 0.375  ;     IIV V1
$SIGMA  0.289  ; EPS(1), proportional
 1E-13  FIX  ;     EPS(2)  ; additive, required by M7+ censoring method
    ; residual variability
$ESTIMATION METHOD=1 INTERACTION ; FOCE-I
            MAXEVAL=9999 SIG=3 PRINT=5
$COVARIANCE PRINT=E UNCONDITIONAL MATRIX=S
 ; output table for standard outcomes
$TABLE      ID TIME TAD DV cAUC EVID PRED IPRED WRES IWRES RES IRES
            CWRES CRES NOPRINT ONEHEADER FILE=run12_sdtab
 ; output table for PK parameters
$TABLE      ID cAUC CL V1 V2 Q K10 K12 K21 NOPRINT NOAPPEND ONEHEADER
            FILE=run12_patab
 ; output table for categorical covariates
$TABLE      ID ADA SEX COL NOPRINT NOAPPEND ONEHEADER FILE=run12_catab
 ; output table for continuous covariates
$TABLE      ID BW ALB AGE CREAT NOPRINT NOAPPEND ONEHEADER
            FILE=run12_cotab
 ; output table for parameters and covariates
$TABLE      ID cAUC CL V1 V2 Q K10 K12 K21 ADA SEX COL BW ALB AGE
            CREAT NOPRINT NOAPPEND ONEHEADER FILE=run12_pa_cov
;; REFERENCES

;; 1) https://www.ncbi.nlm.nih.gov/books/NBK557889/

;; 2) https://pmc.ncbi.nlm.nih.gov/articles/PMC8301575/

;; 3) https://ascpt.onlinelibrary.wiley.com/doi/abs/10.1016/j.clpt.2004.12.212

NM-TRAN MESSAGES
 WARNINGS AND ERRORS (IF ANY) FOR PROBLEM    1
 (WARNING  2) NM-TRAN INFERS THAT THE DATA ARE POPULATION.
 (WARNING  48) DES-DEFINED ITEMS ARE COMPUTED ONLY WHEN EVENT TIME
 INCREASES. E.G., DISPLAYED VALUES ASSOCIATED WITH THE FIRST EVENT RECORD
 OF AN INDIVIDUAL RECORD ARE COMPUTED WITH (THE LAST ADVANCE TO) AN EVENT
 TIME OF THE PRIOR INDIVIDUAL RECORD.
 (WARNING  79) SIGMA IS USED ON THE RIGHT. WITH A SUBSEQUENT RUN, IF AN
 INITIAL ESTIMATE OF A DIAGONAL BLOCK OF SIGMA IS TO BE COMPUTED BY
 NONMEM, THAT BLOCK WILL BE SET TO AN IDENTITY MATRIX DURING THAT
 COMPUTATION. THIS COULD LEAD TO AN ARITHMETIC EXCEPTION.*
 * THE MAXIMUM NUMBER OF WARNINGS OF ONE OR MORE TYPES WAS REACHED.
 IT IS POSSIBLE THAT SOME WARNING MESSAGES WERE SUPPRESSED.

1NONLINEAR MIXED EFFECTS MODEL PROGRAM (NONMEM) VERSION 7.6.0 (nm760)
 ORIGINALLY DEVELOPED BY STUART BEAL, LEWIS SHEINER, AND ALISON BOECKMANN
 CURRENT DEVELOPERS ARE ROBERT BAUER, ICON DEVELOPMENT SOLUTIONS,
 AND ALISON BOECKMANN. IMPLEMENTATION, EFFICIENCY, AND STANDARDIZATION
 PERFORMED BY NOUS INFOSYSTEMS.
 PROBLEM NO.:         1
 PMX001 Two Compartment
 TOT. NO. OF OBS RECS:     2801
 TOT. NO. OF INDIVIDUALS:       75
 GENERAL NONLINEAR KINETICS MODEL WITH STIFF/NONSTIFF EQUATIONS (LSODA, ADVAN13)
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 #TBLN:      1
 #METH: First Order Conditional Estimation with Interaction
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
 #TERM:
0MINIMIZATION TERMINATED
 DUE TO PROXIMITY OF LAST ITERATION EST. TO A VALUE
 AT WHICH THE OBJ. FUNC. IS INFINITE (ERROR=136)
0AT THE LAST COMPUTED INFINITE VALUE OF THE OBJ. FUNCT.:
 ERROR IN NCONTR WITH INDIVIDUAL      35   ID= 3.50000000000000E+01
 NUMERICAL HESSIAN OF OBJ. FUNC. FOR COMPUTING CONDITIONAL ESTIMATE
 IS NON POSITIVE DEFINITE
 THETA=
  1.39E+00   4.72E+00   2.26E-01   2.12E+00   5.79E+00  -1.27E-01

 NO. OF FUNCTION EVALUATIONS USED:      357
 NO. OF SIG. DIGITS UNREPORTABLE

 ETABAR IS THE ARITHMETIC MEAN OF THE ETA-ESTIMATES,
 AND THE P-VALUE IS GIVEN FOR THE NULL HYPOTHESIS THAT THE TRUE MEAN IS 0.

 ETABAR:         1.6249E-02  5.4916E-03
 SE:             8.8838E-02  7.0611E-02
 N:                      75          75

 P VAL.:         8.5487E-01  9.3801E-01

 ETASHRINKSD(%)  8.6800E-02  1.0204E+00
 ETASHRINKVR(%)  1.7352E-01  2.0304E+00
 EBVSHRINKSD(%)  4.4040E-01  9.6363E-01
 EBVSHRINKVR(%)  8.7885E-01  1.9180E+00
 RELATIVEINF(%)  9.9106E+01  9.8067E+01
 EPSSHRINKSD(%)  3.7056E+00  3.7056E+00
 EPSSHRINKVR(%)  7.2738E+00  7.2738E+00


 TOTAL DATA POINTS NORMALLY DISTRIBUTED (N):         2801
 N*LOG(2PI) CONSTANT TO OBJECTIVE FUNCTION:    5147.8936630125763
 OBJECTIVE FUNCTION VALUE WITHOUT CONSTANT:    10624.131162869506
 OBJECTIVE FUNCTION VALUE WITH CONSTANT:       15772.024825882083
 REPORTED OBJECTIVE FUNCTION DOES NOT CONTAIN CONSTANT

 TOTAL EFFECTIVE ETAS (NIND*NETA):                           150


 #TERE:
 Elapsed estimation  time in seconds:  1193.20
 Elapsed covariance  time in seconds:    99.67
 Elapsed postprocess time in seconds:     6.79

 ********************               FIRST ORDER CONDITIONAL ESTIMATION WITH INTERACTION              ********************
 #OBJT:**************                       MINIMUM VALUE OF OBJECTIVE FUNCTION                      ********************
 #OBJV:********************************************         10624.131       *********************************************

 ********************               FIRST ORDER CONDITIONAL ESTIMATION WITH INTERACTION              ********************
 ********************                             FINAL PARAMETER ESTIMATE                           ********************

 THETA - VECTOR OF FIXED EFFECTS PARAMETERS   *********
         TH 1      TH 2      TH 3      TH 4      TH 5      TH 6
         1.39E+00  4.72E+00  2.26E-01  2.12E+00  5.79E+00 -1.27E-01

 OMEGA - COV MATRIX FOR RANDOM EFFECTS - ETAS  ********
         ETA1      ETA2
 ETA1
+        5.93E-01
 ETA2
+        0.00E+00  3.82E-01

 SIGMA - COV MATRIX FOR RANDOM EFFECTS - EPSILONS  ****
         EPS1      EPS2
 EPS1
+        2.89E-01
 EPS2
+        0.00E+00  1.00E-13

 OMEGA - CORR MATRIX FOR RANDOM EFFECTS - ETAS  *******
         ETA1      ETA2
 ETA1
+        7.70E-01
 ETA2
+        0.00E+00  6.18E-01

 SIGMA - CORR MATRIX FOR RANDOM EFFECTS - EPSILONS  ***
         EPS1      EPS2
 EPS1
+        5.38E-01
 EPS2
+        0.00E+00  3.16E-07

 ********************               FIRST ORDER CONDITIONAL ESTIMATION WITH INTERACTION              ********************
 ********************                            STANDARD ERROR OF ESTIMATE                          ********************

 THETA - VECTOR OF FIXED EFFECTS PARAMETERS   *********
         TH 1      TH 2      TH 3      TH 4      TH 5      TH 6
         6.81E-02  1.99E-01  1.27E-02  9.83E-02  2.38E-01  1.11E-03

 OMEGA - COV MATRIX FOR RANDOM EFFECTS - ETAS  ********
         ETA1      ETA2
 ETA1
+        1.56E-01
 ETA2
+       .........  7.61E-02

 SIGMA - COV MATRIX FOR RANDOM EFFECTS - EPSILONS  ****
         EPS1      EPS2
 EPS1
+        1.21E-02
 EPS2
+       ......... .........

 OMEGA - CORR MATRIX FOR RANDOM EFFECTS - ETAS  *******
         ETA1      ETA2
 ETA1
+        1.01E-01
 ETA2
+       .........  6.16E-02

 SIGMA - CORR MATRIX FOR RANDOM EFFECTS - EPSILONS  ***
         EPS1      EPS2
 EPS1
+        1.12E-02
 EPS2
+       ......... .........

 ********************               FIRST ORDER CONDITIONAL ESTIMATION WITH INTERACTION              ********************
 ********************                          COVARIANCE MATRIX OF ESTIMATE                         ********************

            TH 1      TH 2      TH 3      TH 4      TH 5      TH 6      OM11      OM12      OM22      SG11      SG12      SG22
 TH 1
+        4.64E-03
 TH 2
+        3.53E-03  3.97E-02
 TH 3
+        3.66E-04  3.35E-04  1.62E-04
 TH 4
+       -9.10E-04  7.68E-03 -2.57E-05  9.67E-03
 TH 5
+       -1.04E-03 -2.50E-03  1.52E-04 -1.32E-03  5.68E-02
 TH 6
+        2.66E-05 -1.04E-05  7.25E-06 -1.85E-05  3.26E-06  1.23E-06
 OM11
+        1.07E-03  5.22E-03 -1.53E-04  1.91E-03 -4.61E-03 -3.23E-05  2.42E-02
 OM12
+       ......... ......... ......... ......... ......... ......... ......... .........
 OM22
+        9.25E-06 -2.48E-03 -5.03E-05 -6.39E-04  3.66E-04 -1.31E-05 -3.15E-03 .........  5.80E-03
 SG11
+        6.12E-05  5.24E-05  3.03E-05 -1.94E-04  6.23E-04  5.12E-07 -7.60E-04 .........  1.89E-05  1.45E-04
 SG12
+       ......... ......... ......... ......... ......... ......... ......... ......... ......... ......... .........
 SG22
+       ......... ......... ......... ......... ......... ......... ......... ......... ......... ......... ......... .........

 ********************               FIRST ORDER CONDITIONAL ESTIMATION WITH INTERACTION              ********************
 ********************                          CORRELATION MATRIX OF ESTIMATE                        ********************

            TH 1      TH 2      TH 3      TH 4      TH 5      TH 6      OM11      OM12      OM22      SG11      SG12      SG22
 TH 1
+        6.81E-02
 TH 2
+        2.60E-01  1.99E-01
 TH 3
+        4.22E-01  1.32E-01  1.27E-02
 TH 4
+       -1.36E-01  3.92E-01 -2.06E-02  9.83E-02
 TH 5
+       -6.39E-02 -5.28E-02  5.03E-02 -5.63E-02  2.38E-01
 TH 6
+        3.53E-01 -4.71E-02  5.15E-01 -1.70E-01  1.23E-02  1.11E-03
 OM11
+        1.01E-01  1.68E-01 -7.75E-02  1.25E-01 -1.24E-01 -1.88E-01  1.56E-01
 OM12
+       ......... ......... ......... ......... ......... ......... ......... .........
 OM22
+        1.78E-03 -1.63E-01 -5.20E-02 -8.53E-02  2.02E-02 -1.56E-01 -2.66E-01 .........  7.61E-02
 SG11
+        7.46E-02  2.18E-02  1.98E-01 -1.63E-01  2.17E-01  3.84E-02 -4.05E-01 .........  2.06E-02  1.21E-02
 SG12
+       ......... ......... ......... ......... ......... ......... ......... ......... ......... ......... .........
 SG22
+       ......... ......... ......... ......... ......... ......... ......... ......... ......... ......... ......... .........
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
 ********************               FIRST ORDER CONDITIONAL ESTIMATION WITH INTERACTION              ********************
 ********************                      EIGENVALUES OF COR MATRIX OF ESTIMATE                     ********************

             1         2         3         4         5         6         7         8         9
         3.19E-01  4.00E-01  5.37E-01  8.13E-01  8.66E-01  1.03E+00  1.24E+00  1.78E+00  2.02E+00
 Elapsed finaloutput time in seconds:     1.19
 #CPUT: Total CPU Time in Seconds,     1287.337
