do 08 jan 2026 14:18:03 CET
;; 1. Based on: run11
;; 2. Description: PMX001 2CMT TMDD M7+
;; Joshua I., Ali K.
;; 2025-12-09
$PROBLEM    PMX001 Two Compartment TMDDLinear + Michaelis-Menten Model
;; It's basically Target-Mediated Drug Disposition with two assumptions:

;; 1. Free ligand concentration is much larger than total target concentration.

;; 2. Vmax = cst => Rtot = cst => target degradation rate (kout) = ligand-target complex internalization rate (kint)
$INPUT      DUMMY=DROP ID TIME WEEK DOSE=AMT RATE CONC=DROP ADA BW ALB
            SEX AGE CREAT COL EVID BLQ CONC_M7=DV
$DATA      dataset_clean.csv IGNORE=@
$ABBREVIATED DERIV2=NO
$SUBROUTINE ADVAN13 ; general nonlinear model
            TOL=5 ; tolerance for $DES,higher TOL: more accurate,but slower computation

; TOL=7 -> DES will aim for accuracy of 1E-7 for each integration step
$MODEL      NCOMP=2 ; number of compartments
            COMP=(DOSE,DEFDOSE,DEFOBS) ; first (central) compartment
            COMP=(PERIPH) ; second (peripheral) compartment
$PK
IF (EVID.EQ.1) LASTDOSE = TIME
TAD = TIME - LASTDOSE

  TVCL = THETA(1)
TVVMAX = THETA(2)
  TVKM = THETA(3)
  TVV1 = THETA(4)
  TVV2 = THETA(5)
   TVQ = THETA(6)

  CL = TVCL   * EXP(ETA(1))
VMAX = TVVMAX
  KM = TVKM
  V1 = TVV1   * EXP(ETA(2))
  V2 = TVV2
   Q = TVQ

 K10 = CL/V1
 K12 = Q/V1
 K21 = Q/V2

  S1 = V1/1 ; scale prediction based on DOSE (mmol) and DV (mmol/L)
  S2 = V2/1

$THETA  (0.01,1,3) ; [1] CL (L/d)
 (0.5,3,10) ; VMAX
 (0.001,0.1,1) ; KM
 (0.5,10,20) ; [2,3] V1 (L)
 (0.01,0.05,0.5) ; V2
 (0.1,1.1,3) ; Q
 ; values are determined in 3 iterations
$DES DADT(1) = -K10*A(1) -K12*A(1) +K21*A(2) -VMAX*A(1)/(KM*V1 + A(1)) ; ODE central    compartment
     DADT(2) =            K12*A(1) -K21*A(2)                           ; ODE peripheral compartment

$ERROR
IPRED = F
LLOQ = 1  ; (mg/L)

; --- Residual error SDs ---
PROP_SD = SIGMA(1)
ADD_SD  = SIGMA(2)

; --- BLQ inflation (gentle, stable) ---
IF (BLQ.EQ.1) ADD_SD = ADD_SD + LLOQ

; --- Final residual error ---
W = SQRT(ADD_SD**2+PROP_SD**2)

IF (W.LE.0.000001) W=0.000001 ; Protective code

IRES=DV-IPRED
IWRES=IRES/W
Y = IPRED * (1 + EPS(1)) + EPS(2)

$OMEGA  0.01  ;     IIV CL
 0.01  ;     IIV V1
$SIGMA  0.1  ; EPS(1), proportional
 1E-13  FIX  ;     EPS(2)  ; additive, required by M7+ censoring method
    ; residual variability
$ESTIMATION METHOD=1 INTERACTION ; FOCE-I
            MAXEVAL=9999 SIG=3 PRINT=5
$COVARIANCE PRINT=E UNCONDITIONAL MATRIX=S
;; REFERENCES

;; 1) https://www.ncbi.nlm.nih.gov/books/NBK557889/

;; 2) https://pmc.ncbi.nlm.nih.gov/articles/PMC8301575/

;; 3) https://ascpt.onlinelibrary.wiley.com/doi/abs/10.1016/j.clpt.2004.12.212

NM-TRAN MESSAGES
 WARNINGS AND ERRORS (IF ANY) FOR PROBLEM    1
 (WARNING  2) NM-TRAN INFERS THAT THE DATA ARE POPULATION.
 (WARNING  79) SIGMA IS USED ON THE RIGHT. WITH A SUBSEQUENT RUN, IF AN
 INITIAL ESTIMATE OF A DIAGONAL BLOCK OF SIGMA IS TO BE COMPUTED BY
 NONMEM, THAT BLOCK WILL BE SET TO AN IDENTITY MATRIX DURING THAT
 COMPUTATION. THIS COULD LEAD TO AN ARITHMETIC EXCEPTION.*
 * THE MAXIMUM NUMBER OF WARNINGS OF ONE OR MORE TYPES WAS REACHED.
 IT IS POSSIBLE THAT SOME WARNING MESSAGES WERE SUPPRESSED.

1NONLINEAR MIXED EFFECTS MODEL PROGRAM (NONMEM) VERSION 7.6.0 (nm760)
 ORIGINALLY DEVELOPED BY STUART BEAL, LEWIS SHEINER, AND ALISON BOECKMANN
 CURRENT DEVELOPERS ARE ROBERT BAUER, ICON DEVELOPMENT SOLUTIONS,
 AND ALISON BOECKMANN. IMPLEMENTATION, EFFICIENCY, AND STANDARDIZATION
 PERFORMED BY NOUS INFOSYSTEMS.
 PROBLEM NO.:         1
 PMX001 Two Compartment TMDDLinear + Michaelis-Menten Model
 TOT. NO. OF OBS RECS:     2801
 TOT. NO. OF INDIVIDUALS:       75
 GENERAL NONLINEAR KINETICS MODEL WITH STIFF/NONSTIFF EQUATIONS (LSODA, ADVAN13)
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 #TBLN:      1
 #METH: First Order Conditional Estimation with Interaction
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
 #TERM:
0MINIMIZATION TERMINATED
 DUE TO PROXIMITY OF NEXT ITERATION EST. TO A VALUE
 AT WHICH THE OBJ. FUNC. IS INFINITE
0AT THE LAST COMPUTED INFINITE VALUE OF THE OBJ. FUNCT.:
 ERROR IN NCONTR WITH INDIVIDUAL      39   ID= 3.90000000000000E+01
 NUMERICAL HESSIAN OF OBJ. FUNC. FOR COMPUTING CONDITIONAL ESTIMATE
 IS NON POSITIVE DEFINITE
 THETA=
  4.51E-01   3.01E+00   3.48E-02   6.53E+00   4.76E-02   1.67E+00

 NO. OF FUNCTION EVALUATIONS USED:      573
 NO. OF SIG. DIGITS UNREPORTABLE

 ETABAR IS THE ARITHMETIC MEAN OF THE ETA-ESTIMATES,
 AND THE P-VALUE IS GIVEN FOR THE NULL HYPOTHESIS THAT THE TRUE MEAN IS 0.

 ETABAR:         8.6881E-01 -3.9239E-01
 SE:             9.6262E-02  5.2211E-02
 N:                      75          75

 P VAL.:         1.8152E-19  5.7203E-14

 ETASHRINKSD(%)  1.0000E-10  6.3186E+00
 ETASHRINKVR(%)  1.0000E-10  1.2238E+01
 EBVSHRINKSD(%)  1.2895E-01  5.2149E-01
 EBVSHRINKVR(%)  2.5773E-01  1.0403E+00
 RELATIVEINF(%)  9.9741E+01  9.8958E+01
 EPSSHRINKSD(%)  1.0822E+01  1.0822E+01
 EPSSHRINKVR(%)  2.0473E+01  2.0473E+01


 TOTAL DATA POINTS NORMALLY DISTRIBUTED (N):         2801
 N*LOG(2PI) CONSTANT TO OBJECTIVE FUNCTION:    5147.8936630125763
 OBJECTIVE FUNCTION VALUE WITHOUT CONSTANT:    3359.5936487114200
 OBJECTIVE FUNCTION VALUE WITH CONSTANT:       8507.4873117239968
 REPORTED OBJECTIVE FUNCTION DOES NOT CONTAIN CONSTANT

 TOTAL EFFECTIVE ETAS (NIND*NETA):                           150


 #TERE:
 Elapsed estimation  time in seconds:  1235.33
0PROGRAM TERMINATED BY OBJ
 ERROR IN NCONTR WITH INDIVIDUAL      29   ID= 2.90000000000000E+01
 NUMERICAL HESSIAN OF OBJ. FUNC. FOR COMPUTING CONDITIONAL ESTIMATE
 IS NON POSITIVE DEFINITE
0S MATRIX ALGORITHMICALLY SINGULAR
0COVARIANCE MATRIX UNOBTAINABLE
 Elapsed covariance  time in seconds:    39.50
 Elapsed postprocess time in seconds:     0.00

 ********************               FIRST ORDER CONDITIONAL ESTIMATION WITH INTERACTION              ********************
 #OBJT:**************                       MINIMUM VALUE OF OBJECTIVE FUNCTION                      ********************
 #OBJV:********************************************          3359.594       *********************************************

 ********************               FIRST ORDER CONDITIONAL ESTIMATION WITH INTERACTION              ********************
 ********************                             FINAL PARAMETER ESTIMATE                           ********************

 THETA - VECTOR OF FIXED EFFECTS PARAMETERS   *********
         TH 1      TH 2      TH 3      TH 4      TH 5      TH 6
         4.39E-01  3.01E+00  3.89E-02  7.27E+00  4.76E-02  1.68E+00

 OMEGA - COV MATRIX FOR RANDOM EFFECTS - ETAS  ********
         ETA1      ETA2
 ETA1
+        1.38E+00
 ETA2
+        0.00E+00  4.08E-01

 SIGMA - COV MATRIX FOR RANDOM EFFECTS - EPSILONS  ****
         EPS1      EPS2
 EPS1
+        1.28E-01
 EPS2
+        0.00E+00  1.00E-13

 OMEGA - CORR MATRIX FOR RANDOM EFFECTS - ETAS  *******
         ETA1      ETA2
 ETA1
+        1.17E+00
 ETA2
+        0.00E+00  6.39E-01

 SIGMA - CORR MATRIX FOR RANDOM EFFECTS - EPSILONS  ***
         EPS1      EPS2
 EPS1
+        3.58E-01
 EPS2
+        0.00E+00  3.16E-07
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 Elapsed finaloutput time in seconds:     0.00
 #CPUT: Total CPU Time in Seconds,     1274.649
