vr 09 jan 2026 11:47:58 CET
;; 1. Based on: run15
;; 2. Description: PMX001 2CMT TMDD M7+ (FINAL)
;; Joshua I., Ali K.
;; 2025-12-09
$PROBLEM    PMX001 Two Compartment TMDD Model
;; 2 assumptions:

;; 1. Free ligand concentration is much larger than total target concentration.

;; 2. Vmax = cst => Rtot = cst => target degradation rate (kout) = ligand-target complex internalization rate (kint)
$INPUT      DUMMY=DROP ID TIME WEEK DOSE=AMT RATE CONC=DROP ADA BW ALB
            SEX AGE CREAT COL EVID BLQ CONC_M7=DV
$DATA      dataset_clean.csv IGNORE=@
$ABBREVIATED DERIV2=NO
$SUBROUTINE ADVAN13 ; general nonlinear model
            TOL=5 ; tolerance for $DES,higher TOL: more accurate,but slower computation

; TOL=7 -> DES will aim for accuracy of 1E-7 for each integration step
$MODEL      NCOMP=3 ; number of compartments
            COMP=(DOSE,DEFDOSE,DEFOBS) ; first (central) compartment
            COMP=(PERIPH) ; second (peripheral) compartment
            COMP=(AUC) ; continuous AUC integration
$PK
IF (EVID.EQ.1) LASTDOSE = TIME
TAD = TIME - LASTDOSE

  TVCL = THETA(1)
TVVMAX = THETA(2)
  TVKM = THETA(3)
  TVV1 = THETA(4)
  TVV2 = THETA(5)
   TVQ = THETA(6)

CLALB = ((ALB/31.85)**THETA(7))

  CL = TVCL   * EXP(ETA(1)) * CLALB
VMAX = TVVMAX
  KM = TVKM
  V1 = TVV1
  V2 = TVV2
   Q = TVQ

 K10 = CL/V1
 K12 = Q/V1
 K21 = Q/V2

  S1 = V1/1 ; scale prediction based on DOSE (mmol) and DV (mmol/L)
  S2 = V2/1

$THETA  (0.01,0.944,2.3) ; [1] CL (L/d)
 (0.5,1.38,3) ; VMAX
 (0.001,0.00758,0.02) ; KM
 (0.5,4.42,9) ; [2,3] V1 (L)
 (0.00001,0.000307,0.0006) ; V2
 (0.1,13,30) ; Q
 (-100,-3.41223,50) ; CLALB
 ; values are determined in 3 iterations
$DES DADT(1) = -K10*A(1) -K12*A(1) +K21*A(2) -VMAX*A(1)/(KM*V1 + A(1)) ; ODE central    compartment
     DADT(2) =            K12*A(1) -K21*A(2)                           ; ODE peripheral compartment
        cAUC = A(1)/V1
     DADT(3) = cAUC

$ERROR
IPRED = F
LLOQ = 1  ; (mg/L)

; --- Residual error SDs ---
PROP_SD = SIGMA(1)
ADD_SD  = SIGMA(2)

; --- BLQ inflation (gentle, stable) ---
IF (BLQ.EQ.1) ADD_SD = ADD_SD + LLOQ

; --- Final residual error ---
W = SQRT(ADD_SD**2+PROP_SD**2)

IF (W.LE.0.000001) W=0.000001 ; Protective code

IRES=DV-IPRED
IWRES=IRES/W
Y = IPRED * (1 + EPS(1)) + EPS(2)

$OMEGA  0.366  ;     IIV CL
$SIGMA  0.327  ; EPS(1), proportional
 1E-13  FIX  ;     EPS(2)  ; additive, required by M7+ censoring method
    ; residual variability
$ESTIMATION METHOD=1 INTERACTION ; FOCE-I
            MAXEVAL=9999 SIG=3 SIGL=3 PRINT=5
$COVARIANCE PRINT=E UNCONDITIONAL MATRIX=S
 ; output table for standard outcomes
$TABLE      ID TIME TAD DV EVID PRED IPRED WRES IWRES RES IRES CWRES
            CRES NOPRINT ONEHEADER FILE=run16_sdtab
 ; output table for PK parameters
$TABLE      ID CL VMAX KM V1 V2 Q K10 K12 K21 NOPRINT NOAPPEND
            ONEHEADER FILE=run16_patab
 ; output table for categorical covariates
$TABLE      ID ADA SEX COL NOPRINT NOAPPEND ONEHEADER FILE=run16_catab
 ; output table for continuous covariates
$TABLE      ID BW ALB AGE CREAT NOPRINT NOAPPEND ONEHEADER
            FILE=run16_cotab
 ; output table for parameters and covariates
$TABLE      ID cAUC CL VMAX KM V1 V2 Q K10 K12 K21 ADA SEX COL BW ALB
            AGE CREAT NOPRINT NOAPPEND ONEHEADER FILE=run16_pa_cov
;; REFERENCES

;; 1) https://www.ncbi.nlm.nih.gov/books/NBK557889/

;; 2) https://pmc.ncbi.nlm.nih.gov/articles/PMC8301575/

;; 3) https://ascpt.onlinelibrary.wiley.com/doi/abs/10.1016/j.clpt.2004.12.212

NM-TRAN MESSAGES
 WARNINGS AND ERRORS (IF ANY) FOR PROBLEM    1
 (WARNING  2) NM-TRAN INFERS THAT THE DATA ARE POPULATION.
 (WARNING  48) DES-DEFINED ITEMS ARE COMPUTED ONLY WHEN EVENT TIME
 INCREASES. E.G., DISPLAYED VALUES ASSOCIATED WITH THE FIRST EVENT RECORD
 OF AN INDIVIDUAL RECORD ARE COMPUTED WITH (THE LAST ADVANCE TO) AN EVENT
 TIME OF THE PRIOR INDIVIDUAL RECORD.
 (WARNING  79) SIGMA IS USED ON THE RIGHT. WITH A SUBSEQUENT RUN, IF AN
 INITIAL ESTIMATE OF A DIAGONAL BLOCK OF SIGMA IS TO BE COMPUTED BY
 NONMEM, THAT BLOCK WILL BE SET TO AN IDENTITY MATRIX DURING THAT
 COMPUTATION. THIS COULD LEAD TO AN ARITHMETIC EXCEPTION.*
 * THE MAXIMUM NUMBER OF WARNINGS OF ONE OR MORE TYPES WAS REACHED.
 IT IS POSSIBLE THAT SOME WARNING MESSAGES WERE SUPPRESSED.

1NONLINEAR MIXED EFFECTS MODEL PROGRAM (NONMEM) VERSION 7.6.0 (nm760)
 ORIGINALLY DEVELOPED BY STUART BEAL, LEWIS SHEINER, AND ALISON BOECKMANN
 CURRENT DEVELOPERS ARE ROBERT BAUER, ICON DEVELOPMENT SOLUTIONS,
 AND ALISON BOECKMANN. IMPLEMENTATION, EFFICIENCY, AND STANDARDIZATION
 PERFORMED BY NOUS INFOSYSTEMS.
 PROBLEM NO.:         1
 PMX001 Two Compartment TMDD Model
 TOT. NO. OF OBS RECS:     2801
 TOT. NO. OF INDIVIDUALS:       75
 GENERAL NONLINEAR KINETICS MODEL WITH STIFF/NONSTIFF EQUATIONS (LSODA, ADVAN13)
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 #TBLN:      1
 #METH: First Order Conditional Estimation with Interaction
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
 #TERM:
0MINIMIZATION SUCCESSFUL
 HOWEVER, PROBLEMS OCCURRED WITH THE MINIMIZATION.
 REGARD THE RESULTS OF THE ESTIMATION STEP CAREFULLY, AND ACCEPT THEM ONLY
 AFTER CHECKING THAT THE COVARIANCE STEP PRODUCES REASONABLE OUTPUT.
 NO. OF FUNCTION EVALUATIONS USED:      111
 NO. OF SIG. DIGITS IN FINAL EST.:  3.1

 ETABAR IS THE ARITHMETIC MEAN OF THE ETA-ESTIMATES,
 AND THE P-VALUE IS GIVEN FOR THE NULL HYPOTHESIS THAT THE TRUE MEAN IS 0.

 ETABAR:         1.1015E-01
 SE:             7.4086E-02
 N:                      75

 P VAL.:         1.3707E-01

 ETASHRINKSD(%)  1.0000E-10
 ETASHRINKVR(%)  1.0000E-10
 EBVSHRINKSD(%)  3.6352E-01
 EBVSHRINKVR(%)  7.2573E-01
 RELATIVEINF(%)  9.9274E+01
 EPSSHRINKSD(%)  7.3744E+00  7.3744E+00
 EPSSHRINKVR(%)  1.4205E+01  1.4205E+01


 TOTAL DATA POINTS NORMALLY DISTRIBUTED (N):         2801
 N*LOG(2PI) CONSTANT TO OBJECTIVE FUNCTION:    5147.8936630125763
 OBJECTIVE FUNCTION VALUE WITHOUT CONSTANT:    5309.2963378200520
 OBJECTIVE FUNCTION VALUE WITH CONSTANT:       10457.190000832628
 REPORTED OBJECTIVE FUNCTION DOES NOT CONTAIN CONSTANT

 TOTAL EFFECTIVE ETAS (NIND*NETA):                            75


 #TERE:
 Elapsed estimation  time in seconds:   130.92
 Elapsed covariance  time in seconds:    29.98
 Elapsed postprocess time in seconds:     2.39

 ********************               FIRST ORDER CONDITIONAL ESTIMATION WITH INTERACTION              ********************
 #OBJT:**************                       MINIMUM VALUE OF OBJECTIVE FUNCTION                      ********************
 #OBJV:********************************************          5309.296       *********************************************

 ********************               FIRST ORDER CONDITIONAL ESTIMATION WITH INTERACTION              ********************
 ********************                             FINAL PARAMETER ESTIMATE                           ********************

 THETA - VECTOR OF FIXED EFFECTS PARAMETERS   *********
         TH 1      TH 2      TH 3      TH 4      TH 5      TH 6      TH 7
         9.43E-01  1.38E+00  7.58E-03  4.42E+00  3.07E-04  1.30E+01 -3.74E+00

 OMEGA - COV MATRIX FOR RANDOM EFFECTS - ETAS  ********
         ETA1
 ETA1
+        3.66E-01

 SIGMA - COV MATRIX FOR RANDOM EFFECTS - EPSILONS  ****
         EPS1      EPS2
 EPS1
+        3.27E-01
 EPS2
+        0.00E+00  1.00E-13

 OMEGA - CORR MATRIX FOR RANDOM EFFECTS - ETAS  *******
         ETA1
 ETA1
+        6.05E-01

 SIGMA - CORR MATRIX FOR RANDOM EFFECTS - EPSILONS  ***
         EPS1      EPS2
 EPS1
+        5.72E-01
 EPS2
+        0.00E+00  3.16E-07

 ********************               FIRST ORDER CONDITIONAL ESTIMATION WITH INTERACTION              ********************
 ********************                            STANDARD ERROR OF ESTIMATE                          ********************

 THETA - VECTOR OF FIXED EFFECTS PARAMETERS   *********
         TH 1      TH 2      TH 3      TH 4      TH 5      TH 6      TH 7
         5.47E-03  1.27E-03  8.96E-05  1.08E-02  1.56E-06  3.26E-01  6.37E-03

 OMEGA - COV MATRIX FOR RANDOM EFFECTS - ETAS  ********
         ETA1
 ETA1
+        1.46E-02

 SIGMA - COV MATRIX FOR RANDOM EFFECTS - EPSILONS  ****
         EPS1      EPS2
 EPS1
+        2.40E-03
 EPS2
+       ......... .........

 OMEGA - CORR MATRIX FOR RANDOM EFFECTS - ETAS  *******
         ETA1
 ETA1
+        1.20E-02

 SIGMA - CORR MATRIX FOR RANDOM EFFECTS - EPSILONS  ***
         EPS1      EPS2
 EPS1
+        2.10E-03
 EPS2
+       ......... .........

 ********************               FIRST ORDER CONDITIONAL ESTIMATION WITH INTERACTION              ********************
 ********************                          COVARIANCE MATRIX OF ESTIMATE                         ********************

            TH 1      TH 2      TH 3      TH 4      TH 5      TH 6      TH 7      OM11      SG11      SG12      SG22
 TH 1
+        2.99E-05
 TH 2
+       -1.93E-06  1.62E-06
 TH 3
+       -3.78E-08 -1.91E-08  8.03E-09
 TH 4
+       -3.51E-06 -2.91E-06  4.81E-07  1.17E-04
 TH 5
+       -7.60E-09 -5.30E-12  3.98E-11  5.92E-09  2.43E-12
 TH 6
+        2.68E-04 -5.99E-05  2.49E-05  1.09E-03 -7.67E-09  1.06E-01
 TH 7
+        8.21E-07  4.00E-07 -2.28E-08 -1.90E-06 -7.18E-10 -4.72E-05  4.06E-05
 OM11
+        1.19E-06  1.37E-06 -2.90E-08 -9.79E-06 -7.59E-10  1.41E-05 -5.87E-08  2.12E-04
 SG11
+        3.66E-07 -4.76E-07  3.08E-08  1.70E-05 -1.17E-10  9.45E-05  4.29E-07 -2.42E-06  5.78E-06
 SG12
+       ......... ......... ......... ......... ......... ......... ......... ......... ......... .........
 SG22
+       ......... ......... ......... ......... ......... ......... ......... ......... ......... ......... .........

 ********************               FIRST ORDER CONDITIONAL ESTIMATION WITH INTERACTION              ********************
 ********************                          CORRELATION MATRIX OF ESTIMATE                        ********************

            TH 1      TH 2      TH 3      TH 4      TH 5      TH 6      TH 7      OM11      SG11      SG12      SG22
 TH 1
+        5.47E-03
 TH 2
+       -2.77E-01  1.27E-03
 TH 3
+       -7.72E-02 -1.68E-01  8.96E-05
 TH 4
+       -5.94E-02 -2.11E-01  4.96E-01  1.08E-02
 TH 5
+       -8.91E-01 -2.67E-03  2.85E-01  3.51E-01  1.56E-06
 TH 6
+        1.50E-01 -1.44E-01  8.53E-01  3.10E-01 -1.51E-02  3.26E-01
 TH 7
+        2.36E-02  4.93E-02 -4.00E-02 -2.76E-02 -7.23E-02 -2.28E-02  6.37E-03
 OM11
+        1.49E-02  7.39E-02 -2.22E-02 -6.21E-02 -3.34E-02  2.98E-03 -6.33E-04  1.46E-02
 SG11
+        2.78E-02 -1.55E-01  1.43E-01  6.54E-01 -3.11E-02  1.21E-01  2.80E-02 -6.91E-02  2.40E-03
 SG12
+       ......... ......... ......... ......... ......... ......... ......... ......... ......... .........
 SG22
+       ......... ......... ......... ......... ......... ......... ......... ......... ......... ......... .........
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
 ********************               FIRST ORDER CONDITIONAL ESTIMATION WITH INTERACTION              ********************
 ********************                      EIGENVALUES OF COR MATRIX OF ESTIMATE                     ********************

             1         2         3         4         5         6         7         8         9
         2.77E-03  8.69E-02  3.15E-01  8.45E-01  9.79E-01  1.03E+00  1.28E+00  1.96E+00  2.50E+00
 Elapsed finaloutput time in seconds:     0.58
 #CPUT: Total CPU Time in Seconds,      165.247
