ma 05 jan 2026 23:35:19 CET
;; 1. Based on: run01
;; 2. Description: PMX001 1CMT LINEAR M7+
;; Joshua I., Ali K.
;; 2025-12-09
$PROBLEM    PMX001 One Compartment
$INPUT      DUMMY=DROP ID TIME WEEK DOSE=AMT RATE CONC=DROP ADA BW ALB
            SEX=DROP AGE CREAT COL EVID BLQ CONC_M7=DV
$DATA      dataset_clean.csv IGNORE=@
$ABBREVIATED DERIV2=NO
$SUBROUTINE ADVAN13 ; general nonlinear model
            TOL=9 ; tolerance for $DES,higher TOL: more accurate,but slower computation

; TOL=9 -> DES will aim for accuracy of 1E-9 for each integration step
$MODEL      NCOMP=1 ; number of compartments
            COMP=(DOSE,DEFDOSE,DEFOBS) ; first (central) compartment
$PK
;; time after dose
IF (EVID.EQ.1) LASTDOSE = TIME
TAD = TIME - LASTDOSE

;;; VCREAT-DEFINITION START
VCREAT = ( 1 + THETA(9)*(CREAT - 1.03))
;;; VCREAT-DEFINITION END

;;; VBW-DEFINITION START
IF(BW.LE.65.93) VBW = ( 1 + THETA(7)*(BW - 65.93))
IF(BW.GT.65.93) VBW = ( 1 + THETA(8)*(BW - 65.93))
;;; VBW-DEFINITION END

;;; VALB-DEFINITION START
IF(ALB.LE.31.85) VALB = ( 1 + THETA(5)*(ALB - 31.85))
IF(ALB.GT.31.85) VALB = ( 1 + THETA(6)*(ALB - 31.85))
;;; VALB-DEFINITION END

;;; VADA-DEFINITION START
IF(ADA.EQ.0) VADA = 1  ; Most common
IF(ADA.EQ.1) VADA = ( 1 + THETA(4))
;;; VADA-DEFINITION END

;;; V-RELATION START
VCOV=VADA*VALB*VBW*VCREAT
;;; V-RELATION END

;;; CLADA-DEFINITION START
IF(ADA.EQ.0) CLADA = 1  ; Most common
IF(ADA.EQ.1) CLADA = ( 1 + THETA(3))
;;; CLADA-DEFINITION END

;;; CL-RELATION START
CLCOV=CLADA
;;; CL-RELATION END

TVCL = THETA(1)
  CL = TVCL * EXP(ETA(1)) * CLCOV
 TVV = THETA(2)
   V = TVV  * EXP(ETA(2)) * VCOV
 K10 = CL/V
  S1 = V ; scale prediction based on DOSE (mmol) and DV (mmol/L)

$THETA  (0.001,1.38084,8) ; CL (L/d) [1]
 (0.001,7.67529,15) ; V (L) [2,3]
 (-1,4.15573,9) ; CLADA
 (-1,-0.279594,5) ; VADA
 (-100,0.019778,0.084) ; VALB1
 (-0.134,-0.125712,100) ; VALB2
 (-100,0.0144423,0.042) ; VBW1
 (-0.055,-0.0497278,100) ; VBW2
 (-1.250,0.264683,1.190) ; VCREAT
   ; values are determined in 3 iterations
$DES DADT(1) = -K10*A(1)  ; ODE for central compartment

$ERROR
IPRED = F
LLOQ = 1  ; (mg/L)

; --- Residual error SDs ---
PROP_SD = SIGMA(1)
ADD_SD  = SIGMA(2)

; --- BLQ inflation (gentle, stable) ---
IF (BLQ.EQ.1) ADD_SD = ADD_SD + LLOQ

; --- Final residual error ---
W = SQRT(ADD_SD**2+PROP_SD**2)

IF (W.LE.0.000001) W=0.000001 ; Protective code

IRES=DV-IPRED
IWRES=IRES/W
Y = IPRED * (1 + EPS(1)) + EPS(2)

$OMEGA  0.598566  FIX  ; IIV CL (value obtained from SCM+)
 0.342736  ;      IIV V
$SIGMA  0.282155  ; EPS(1), proportional (value obtained from SCM+)
 5E-13  FIX  ;     EPS(2)  ; additive, required by M7+ censoring method
    ; residual variability
$ESTIMATION METHOD=1 INTERACTION ; FOCE-I
            SIG=3 PRINT=5 MAXEVALS=9999
$COVARIANCE PRINT=E UNCONDITIONAL MATRIX=S

NM-TRAN MESSAGES
 WARNINGS AND ERRORS (IF ANY) FOR PROBLEM    1
 (WARNING  2) NM-TRAN INFERS THAT THE DATA ARE POPULATION.
 (WARNING  79) SIGMA IS USED ON THE RIGHT. WITH A SUBSEQUENT RUN, IF AN
 INITIAL ESTIMATE OF A DIAGONAL BLOCK OF SIGMA IS TO BE COMPUTED BY
 NONMEM, THAT BLOCK WILL BE SET TO AN IDENTITY MATRIX DURING THAT
 COMPUTATION. THIS COULD LEAD TO AN ARITHMETIC EXCEPTION.*
 * THE MAXIMUM NUMBER OF WARNINGS OF ONE OR MORE TYPES WAS REACHED.
 IT IS POSSIBLE THAT SOME WARNING MESSAGES WERE SUPPRESSED.

1NONLINEAR MIXED EFFECTS MODEL PROGRAM (NONMEM) VERSION 7.6.0 (nm760)
 ORIGINALLY DEVELOPED BY STUART BEAL, LEWIS SHEINER, AND ALISON BOECKMANN
 CURRENT DEVELOPERS ARE ROBERT BAUER, ICON DEVELOPMENT SOLUTIONS,
 AND ALISON BOECKMANN. IMPLEMENTATION, EFFICIENCY, AND STANDARDIZATION
 PERFORMED BY NOUS INFOSYSTEMS.
 PROBLEM NO.:         1
 PMX001 One Compartment
 TOT. NO. OF OBS RECS:     2801
 TOT. NO. OF INDIVIDUALS:       75
 GENERAL NONLINEAR KINETICS MODEL WITH STIFF/NONSTIFF EQUATIONS (LSODA, ADVAN13)
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 #TBLN:      1
 #METH: First Order Conditional Estimation with Interaction
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
 #TERM:
0MINIMIZATION SUCCESSFUL
 HOWEVER, PROBLEMS OCCURRED WITH THE MINIMIZATION.
 REGARD THE RESULTS OF THE ESTIMATION STEP CAREFULLY, AND ACCEPT THEM ONLY
 AFTER CHECKING THAT THE COVARIANCE STEP PRODUCES REASONABLE OUTPUT.
 NO. OF FUNCTION EVALUATIONS USED:      529
 NO. OF SIG. DIGITS IN FINAL EST.:  3.3

 ETABAR IS THE ARITHMETIC MEAN OF THE ETA-ESTIMATES,
 AND THE P-VALUE IS GIVEN FOR THE NULL HYPOTHESIS THAT THE TRUE MEAN IS 0.

 ETABAR:        -2.7419E-04 -8.8044E-04
 SE:             8.9914E-02  6.8539E-02
 N:                      75          75

 P VAL.:         9.9757E-01  9.8975E-01

 ETASHRINKSD(%)  1.0000E-10  8.5786E-01
 ETASHRINKVR(%)  1.0000E-10  1.7084E+00
 EBVSHRINKSD(%)  4.3914E-01  9.2720E-01
 EBVSHRINKVR(%)  8.7635E-01  1.8458E+00
 RELATIVEINF(%)  9.9109E+01  9.8139E+01
 EPSSHRINKSD(%)  3.8956E+00  3.8956E+00
 EPSSHRINKVR(%)  7.6395E+00  7.6395E+00


 TOTAL DATA POINTS NORMALLY DISTRIBUTED (N):         2801
 N*LOG(2PI) CONSTANT TO OBJECTIVE FUNCTION:    5147.8936630125763
 OBJECTIVE FUNCTION VALUE WITHOUT CONSTANT:    10731.246629722080
 OBJECTIVE FUNCTION VALUE WITH CONSTANT:       15879.140292734657
 REPORTED OBJECTIVE FUNCTION DOES NOT CONTAIN CONSTANT

 TOTAL EFFECTIVE ETAS (NIND*NETA):                           150


 #TERE:
 Elapsed estimation  time in seconds:   837.48
 Elapsed covariance  time in seconds:    79.18
 Elapsed postprocess time in seconds:     0.00

 ********************               FIRST ORDER CONDITIONAL ESTIMATION WITH INTERACTION              ********************
 #OBJT:**************                       MINIMUM VALUE OF OBJECTIVE FUNCTION                      ********************
 #OBJV:********************************************         10731.247       *********************************************

 ********************               FIRST ORDER CONDITIONAL ESTIMATION WITH INTERACTION              ********************
 ********************                             FINAL PARAMETER ESTIMATE                           ********************

 THETA - VECTOR OF FIXED EFFECTS PARAMETERS   *********
         TH 1      TH 2      TH 3      TH 4      TH 5      TH 6      TH 7      TH 8      TH 9
         1.39E+00  7.64E+00  4.01E+00 -2.79E-01  1.35E-02 -1.26E-01  1.25E-02 -5.07E-02  2.70E-01

 OMEGA - COV MATRIX FOR RANDOM EFFECTS - ETAS  ********
         ETA1      ETA2
 ETA1
+        5.99E-01
 ETA2
+        0.00E+00  3.58E-01

 SIGMA - COV MATRIX FOR RANDOM EFFECTS - EPSILONS  ****
         EPS1      EPS2
 EPS1
+        2.81E-01
 EPS2
+        0.00E+00  5.00E-13

 OMEGA - CORR MATRIX FOR RANDOM EFFECTS - ETAS  *******
         ETA1      ETA2
 ETA1
+        7.74E-01
 ETA2
+        0.00E+00  5.99E-01

 SIGMA - CORR MATRIX FOR RANDOM EFFECTS - EPSILONS  ***
         EPS1      EPS2
 EPS1
+        5.30E-01
 EPS2
+        0.00E+00  7.07E-07

 ********************               FIRST ORDER CONDITIONAL ESTIMATION WITH INTERACTION              ********************
 ********************                            STANDARD ERROR OF ESTIMATE                          ********************

 THETA - VECTOR OF FIXED EFFECTS PARAMETERS   *********
         TH 1      TH 2      TH 3      TH 4      TH 5      TH 6      TH 7      TH 8      TH 9
         1.73E-01  8.94E-01  7.30E-01  1.43E-01  1.05E-02  1.94E-03  6.79E-03  2.10E-03  7.77E-02

 OMEGA - COV MATRIX FOR RANDOM EFFECTS - ETAS  ********
         ETA1      ETA2
 ETA1
+       .........
 ETA2
+       .........  8.12E-02

 SIGMA - COV MATRIX FOR RANDOM EFFECTS - EPSILONS  ****
         EPS1      EPS2
 EPS1
+        1.34E-02
 EPS2
+       ......... .........

 OMEGA - CORR MATRIX FOR RANDOM EFFECTS - ETAS  *******
         ETA1      ETA2
 ETA1
+       .........
 ETA2
+       .........  6.78E-02

 SIGMA - CORR MATRIX FOR RANDOM EFFECTS - EPSILONS  ***
         EPS1      EPS2
 EPS1
+        1.26E-02
 EPS2
+       ......... .........

 ********************               FIRST ORDER CONDITIONAL ESTIMATION WITH INTERACTION              ********************
 ********************                          COVARIANCE MATRIX OF ESTIMATE                         ********************

            TH 1      TH 2      TH 3      TH 4      TH 5      TH 6      TH 7      TH 8      TH 9      OM11      OM12      OM22
             SG11      SG12      SG22
 TH 1
+        2.98E-02
 TH 2
+       -9.23E-02  7.99E-01
 TH 3
+       -4.49E-02  2.33E-01  5.33E-01
 TH 4
+       -7.06E-03  3.73E-02  9.99E-02  2.03E-02
 TH 5
+       -4.73E-05  4.94E-04 -4.06E-04 -5.21E-05  1.11E-04
 TH 6
+        1.08E-04 -4.90E-04 -2.90E-04 -5.05E-05  5.72E-07  3.77E-06
 TH 7
+        8.65E-05  1.69E-03 -5.51E-04 -1.39E-04  3.74E-06  2.42E-06  4.62E-05
 TH 8
+        1.98E-05 -3.21E-04 -1.26E-05  2.79E-07 -1.28E-06  5.52E-08 -1.30E-06  4.41E-06
 TH 9
+        1.91E-03  4.63E-03 -8.88E-03 -1.66E-03  6.08E-05 -3.83E-06  8.60E-05 -4.26E-05  6.04E-03
 OM11
+       ......... ......... ......... ......... ......... ......... ......... ......... ......... .........
 OM12
+       ......... ......... ......... ......... ......... ......... ......... ......... ......... ......... .........
 OM22
+        5.49E-03 -3.42E-02 -7.12E-03 -1.04E-03 -1.14E-04 -1.12E-05 -8.96E-05  2.05E-05  1.50E-03 ......... .........  6.59E-03
 SG11
+       -9.19E-04  6.30E-03  3.87E-03  6.25E-04 -1.88E-05 -7.23E-06 -8.78E-06 -3.24E-06  1.02E-05 ......... ......... -2.83E-04
          1.80E-04
 SG12
+       ......... ......... ......... ......... ......... ......... ......... ......... ......... ......... ......... .........
         ......... .........
 SG22
+       ......... ......... ......... ......... ......... ......... ......... ......... ......... ......... ......... .........
         ......... ......... .........

 ********************               FIRST ORDER CONDITIONAL ESTIMATION WITH INTERACTION              ********************
 ********************                          CORRELATION MATRIX OF ESTIMATE                        ********************

            TH 1      TH 2      TH 3      TH 4      TH 5      TH 6      TH 7      TH 8      TH 9      OM11      OM12      OM22
             SG11      SG12      SG22
 TH 1
+        1.73E-01
 TH 2
+       -5.98E-01  8.94E-01
 TH 3
+       -3.57E-01  3.57E-01  7.30E-01
 TH 4
+       -2.87E-01  2.93E-01  9.60E-01  1.43E-01
 TH 5
+       -2.61E-02  5.25E-02 -5.28E-02 -3.47E-02  1.05E-02
 TH 6
+        3.22E-01 -2.82E-01 -2.04E-01 -1.83E-01  2.80E-02  1.94E-03
 TH 7
+        7.38E-02  2.78E-01 -1.11E-01 -1.44E-01  5.23E-02  1.83E-01  6.79E-03
 TH 8
+        5.46E-02 -1.71E-01 -8.24E-03  9.32E-04 -5.79E-02  1.35E-02 -9.10E-02  2.10E-03
 TH 9
+        1.43E-01  6.66E-02 -1.57E-01 -1.50E-01  7.44E-02 -2.54E-02  1.63E-01 -2.61E-01  7.77E-02
 OM11
+       ......... ......... ......... ......... ......... ......... ......... ......... ......... .........
 OM12
+       ......... ......... ......... ......... ......... ......... ......... ......... ......... ......... .........
 OM22
+        3.92E-01 -4.72E-01 -1.20E-01 -8.96E-02 -1.33E-01 -7.12E-02 -1.62E-01  1.20E-01  2.37E-01 ......... .........  8.12E-02
 SG11
+       -3.98E-01  5.26E-01  3.96E-01  3.27E-01 -1.33E-01 -2.78E-01 -9.65E-02 -1.15E-01  9.78E-03 ......... ......... -2.60E-01
          1.34E-02
 SG12
+       ......... ......... ......... ......... ......... ......... ......... ......... ......... ......... ......... .........
         ......... .........
 SG22
+       ......... ......... ......... ......... ......... ......... ......... ......... ......... ......... ......... .........
         ......... ......... .........
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
 ********************               FIRST ORDER CONDITIONAL ESTIMATION WITH INTERACTION              ********************
 ********************                      EIGENVALUES OF COR MATRIX OF ESTIMATE                     ********************

             1         2         3         4         5         6         7         8         9        10        11
         3.46E-02  2.40E-01  4.01E-01  5.15E-01  6.41E-01  8.67E-01  1.01E+00  1.13E+00  1.31E+00  1.71E+00  3.15E+00
 Elapsed finaloutput time in seconds:     0.01
 #CPUT: Total CPU Time in Seconds,      918.832
