ma 05 jan 2026 19:50:53 CET
;; 1. Based on: run01
;; 2. Description: PMX001 1CMT LINEAR M7+
;; Joshua I., Ali K.
;; 2025-12-09
$PROBLEM    PMX001 One Compartment
$INPUT      DUMMY=DROP ID TIME WEEK DOSE=AMT RATE CONC=DROP ADA BW ALB
            SEX=DROP AGE CREAT COL EVID BLQ CONC_M7=DV
$DATA      ../../dataset_clean.csv IGNORE=@
$ABBREVIATED DERIV2=NO
$SUBROUTINE ADVAN13 ; general nonlinear model
            TOL=9 ; tolerance for $DES,higher TOL: more accurate,but slower computation

; TOL=9 -> DES will aim for accuracy of 1E-9 for each integration step
$MODEL      NCOMP=1 ; number of compartments
            COMP=(DOSE,DEFDOSE,DEFOBS) ; first (central) compartment
$PK
;;; VALB-DEFINITION START
VALB = ( 1 + THETA(8)*(ALB - 31.85))
;;; VALB-DEFINITION END

;;; VCREAT-DEFINITION START
VCREAT = ( 1 + THETA(7)*(CREAT - 1.03))
;;; VCREAT-DEFINITION END

;;; VBW-DEFINITION START
IF(BW.LE.65.93) VBW = ( 1 + THETA(5)*(BW - 65.93))
IF(BW.GT.65.93) VBW = ( 1 + THETA(6)*(BW - 65.93))
;;; VBW-DEFINITION END

;;; VADA-DEFINITION START
IF(ADA.EQ.0) VADA = 1  ; Most common
IF(ADA.EQ.1) VADA = ( 1 + THETA(4))
;;; VADA-DEFINITION END

;;; V-RELATION START
VCOV=VADA*VBW*VCREAT*VALB
;;; V-RELATION END

;;; CLADA-DEFINITION START
IF(ADA.EQ.0) CLADA = 1  ; Most common
IF(ADA.EQ.1) CLADA = ( 1 + THETA(3))
;;; CLADA-DEFINITION END

;;; CL-RELATION START
CLCOV=CLADA
;;; CL-RELATION END

TVCL = THETA(1)

TVCL = CLCOV*TVCL
  CL = TVCL * EXP(ETA(1))
 TVV = THETA(2)

TVV = VCOV*TVV
   V = TVV  * EXP(ETA(2))
 K10 = CL/V
  S1 = V ; scale prediction based on DOSE (mmol) and DV (mmol/L)

$THETA  (0.001,1.38084,8) ; [1]   CL (L/d)
 (0.001,7.67529,10) ; [2,3] V  (L)
 ; values are determined in 3 iterations
$THETA  (-1,4.15573,5) ; CLADA1
$THETA  (-1,-0.279594,5) ; VADA1
$THETA  (-100000,0.0144423,0.042) ; VBW1
 (-0.055,-0.0497278,100000) ; VBW2
$THETA  (-1.250,0.264683,1.190) ; VCREAT1
$THETA  (-0.134,0.019778,0.084) ; VALB1
$DES DADT(1) = -K10*A(1)  ; ODE for central compartment

$ERROR
IPRED = F
LLOQ = 1  ; (mg/L)

; --- Residual error SDs ---
PROP_SD = SIGMA(1)
ADD_SD  = SIGMA(2)

; --- BLQ inflation (gentle, stable) ---
IF (BLQ.EQ.1) ADD_SD = ADD_SD + LLOQ

; --- Final residual error ---
W = SQRT(ADD_SD**2+PROP_SD**2)

IF (W.LE.0.000001) W=0.000001 ; Protective code

IRES=DV-IPRED
IWRES=IRES/W
Y = IPRED * (1 + EPS(1)) + EPS(2)

$OMEGA  0.598566  ;     IIV CL
 0.342736  ;      IIV V
$SIGMA  0.282155  ; EPS(1), proportional
 5E-13  FIX  ;     EPS(2)  ; additive, required by M7+ censoring method
 ; residual variability
$ESTIMATION METHOD=1 INTERACTION ; FOCE-I
            SIG=3 SIGL=3 PRINT=5 MAXEVALS=220 CTYPE=4

NM-TRAN MESSAGES
 WARNINGS AND ERRORS (IF ANY) FOR PROBLEM    1
 (WARNING  2) NM-TRAN INFERS THAT THE DATA ARE POPULATION.
 (WARNING  79) SIGMA IS USED ON THE RIGHT. WITH A SUBSEQUENT RUN, IF AN
 INITIAL ESTIMATE OF A DIAGONAL BLOCK OF SIGMA IS TO BE COMPUTED BY
 NONMEM, THAT BLOCK WILL BE SET TO AN IDENTITY MATRIX DURING THAT
 COMPUTATION. THIS COULD LEAD TO AN ARITHMETIC EXCEPTION.*
 * THE MAXIMUM NUMBER OF WARNINGS OF ONE OR MORE TYPES WAS REACHED.
 IT IS POSSIBLE THAT SOME WARNING MESSAGES WERE SUPPRESSED.

1NONLINEAR MIXED EFFECTS MODEL PROGRAM (NONMEM) VERSION 7.6.0 (nm760)
 ORIGINALLY DEVELOPED BY STUART BEAL, LEWIS SHEINER, AND ALISON BOECKMANN
 CURRENT DEVELOPERS ARE ROBERT BAUER, ICON DEVELOPMENT SOLUTIONS,
 AND ALISON BOECKMANN. IMPLEMENTATION, EFFICIENCY, AND STANDARDIZATION
 PERFORMED BY NOUS INFOSYSTEMS.
 PROBLEM NO.:         1
 PMX001 One Compartment
 TOT. NO. OF OBS RECS:     2801
 TOT. NO. OF INDIVIDUALS:       75
 GENERAL NONLINEAR KINETICS MODEL WITH STIFF/NONSTIFF EQUATIONS (LSODA, ADVAN13)
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 #TBLN:      1
 #METH: First Order Conditional Estimation with Interaction
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
0PRED EXIT CODE = 1
0INDIVIDUAL NO.      12   ID= 1.20000000000000E+01   (WITHIN-INDIVIDUAL) DATA REC NO. 146
 THETA=
  1.41E+00   4.82E+00   4.14E+00  -1.45E-02   1.42E-02  -5.47E-02   1.72E-01  -1.28E-01
 OCCURS DURING SEARCH FOR ETA AT INITIAL VALUE, ETA=0
 PK PARAMETER FOR OBSERVATION COMPARTMENT'S SCALE IS NON-POSITIVE
0PROGRAM TERMINATED BY OBJ
 MESSAGE ISSUED FROM ESTIMATION STEP

 #TERM:

 TOTAL DATA POINTS NORMALLY DISTRIBUTED (N):          415
 N*LOG(2PI) CONSTANT TO OBJECTIVE FUNCTION:    762.71898255987833
 OBJECTIVE FUNCTION VALUE WITHOUT CONSTANT:    10791.972840474218
 OBJECTIVE FUNCTION VALUE WITH CONSTANT:       11554.691823034096
 REPORTED OBJECTIVE FUNCTION DOES NOT CONTAIN CONSTANT

 TOTAL EFFECTIVE ETAS (NIND*NETA):                            22


 #TERE:
 Elapsed estimation  time in seconds:    92.49
 #CPUT: Total CPU Time in Seconds,       92.290
