zo 04 jan 2026 04:01:23 CET
;; 1. Based on: run01
;; 2. Description: PMX001 2CMT LINEAR M7+ (BASE MODEL)
;; Joshua I., Ali K.
;; 2025-12-09
$PROBLEM    PMX001 Two Compartment
$INPUT      DUMMY=DROP ID TIME WEEK DOSE=AMT RATE CONC=DROP ADA BW ALB
            SEX AGE CREAT COL EVID BLQ CONC_M7=DV
$DATA      ../../../dataset_clean.csv IGNORE=@
$ABBREVIATED DERIV2=NO
$SUBROUTINE ADVAN13 ; general nonlinear model
            TOL=9 ; tolerance for $DES,higher TOL: more accurate,but slower computation

; TOL=7 -> DES will aim for accuracy of 1E-7 for each integration step
$MODEL      NCOMP=2 ; number of compartments
            COMP=(DOSE,DEFDOSE,DEFOBS) ; first (central) compartment
            COMP=(PERIPH) ; second (peripheral) compartment
$PK
;;; CLSEX-DEFINITION START
IF(SEX.EQ.1) CLSEX = 1  ; Most common
IF(SEX.EQ.0) CLSEX = ( 1 + THETA(15))
;;; CLSEX-DEFINITION END

;;; V1CREAT-DEFINITION START
V1CREAT = ( 1 + THETA(14)*(CREAT - 1.03))
;;; V1CREAT-DEFINITION END

;;; V1BW-DEFINITION START
IF(BW.LE.65.93) V1BW = ( 1 + THETA(12)*(BW - 65.93))
IF(BW.GT.65.93) V1BW = ( 1 + THETA(13)*(BW - 65.93))
;;; V1BW-DEFINITION END

;;; V1ALB-DEFINITION START
IF(ALB.LE.31.85) V1ALB = ( 1 + THETA(10)*(ALB - 31.85))
IF(ALB.GT.31.85) V1ALB = ( 1 + THETA(11)*(ALB - 31.85))
;;; V1ALB-DEFINITION END

;;; V1ADA-DEFINITION START
IF(ADA.EQ.0) V1ADA = 1  ; Most common
IF(ADA.EQ.1) V1ADA = ( 1 + THETA(9))
;;; V1ADA-DEFINITION END

;;; V1-RELATION START
V1COV=V1ADA*V1ALB*V1BW*V1CREAT
;;; V1-RELATION END

;;; CLALB-DEFINITION START
IF(ALB.LE.31.88) CLALB = ( 1 + THETA(7)*(ALB - 31.88))
IF(ALB.GT.31.88) CLALB = ( 1 + THETA(8)*(ALB - 31.88))
;;; CLALB-DEFINITION END

;;; CLAGE-DEFINITION START
CLAGE = ( 1 + THETA(6)*(AGE - 33.17))
;;; CLAGE-DEFINITION END

;;; CLADA-DEFINITION START
IF(ADA.EQ.0) CLADA = 1  ; Most common
IF(ADA.EQ.1) CLADA = ( 1 + THETA(5))
;;; CLADA-DEFINITION END

;;; CL-RELATION START
CLCOV=CLADA*CLAGE*CLALB*CLSEX
;;; CL-RELATION END

IF (EVID.EQ.1) LASTDOSE = TIME
TAD = TIME - LASTDOSE

TVCL = THETA(1)

TVCL = CLCOV*TVCL
TVV1 = THETA(2)

TVV1 = V1COV*TVV1
TVV2 = THETA(3)
 TVQ = THETA(4)

  CL = TVCL * EXP(ETA(1))
  V1 = TVV1 * EXP(ETA(2))
  V2 = TVV2
   Q = TVQ

 K10 = CL/V1
 K12 = Q/V1
 K21 = Q/V2

  S1 = V1/1 ; scale prediction based on DOSE (mmol) and DV (mmol/L)
  S2 = V2/1

$THETA  (0.001,1.07294623505496,8) ; [1]   CL (L/d)
 (0.001,7.59018549636582,10) ; [2,3] V1  (L)
 (0.01,0.309363474627511,6) ; V2
 (0.001,2.12373844520596,6) ; Q
 ; values are determined in 3 iterations
$THETA  (-1,3.81254022273865,5) ; CLADA1
$THETA  (-0.050,0.0325266694795803,0.074) ; CLAGE1
$THETA  (-100000,-0.0868966079249262,0.084) ; CLALB1
 (-0.135,0.166889151985122,100000) ; CLALB2
$THETA  (-1,-0.263640356733828,5) ; V1ADA1
$THETA  (-100000,-0.0218916778850096,0.084) ; V1ALB1
 (-0.134,-0.126966558495839,100000) ; V1ALB2
$THETA  (-100000,0.0173835154264878,0.042) ; V1BW1
 (-0.055,-0.0531249883860696,100000) ; V1BW2
$THETA  (-1.250,0.268410691586027,1.190) ; V1CREAT1
$THETA  (-1,-0.000968976776086433,5) ; CLSEX1
$DES DADT(1) = -K10*A(1) -K12*A(1) +K21*A(2) ; ODE for central    compartment
     DADT(2) =            K12*A(1) -K21*A(2) ; ODE for peripheral compartment

$ERROR
IPRED = F
LLOQ = 1  ; (mg/L)

; --- Residual error SDs ---
PROP_SD = SIGMA(1)
ADD_SD  = SIGMA(2)

; --- BLQ inflation (gentle, stable) ---
IF (BLQ.EQ.1) ADD_SD = ADD_SD + LLOQ

; --- Final residual error ---
W = SQRT(ADD_SD**2+PROP_SD**2)

IF (W.LE.0.000001) W=0.000001 ; Protective code

IRES=DV-IPRED
IWRES=IRES/W
Y = IPRED * (1 + EPS(1)) + EPS(2)

$OMEGA  0.581815445837779  ;     IIV CL
 0.387472058243958  ;      IIV V
$SIGMA  0.302486087084895  ; EPS(1), proportional
 5E-13  FIX  ;     EPS(2)  ; additive, required by M7+ censoring method
    ; residual variability
$ESTIMATION METHOD=1 INTERACTION ; FOCE-I
            SIG=3 SIGL=4 PRINT=5 MAXEVALS=9999 CTYPE=4

NM-TRAN MESSAGES
 WARNINGS AND ERRORS (IF ANY) FOR PROBLEM    1
 (WARNING  2) NM-TRAN INFERS THAT THE DATA ARE POPULATION.
 (WARNING  79) SIGMA IS USED ON THE RIGHT. WITH A SUBSEQUENT RUN, IF AN
 INITIAL ESTIMATE OF A DIAGONAL BLOCK OF SIGMA IS TO BE COMPUTED BY
 NONMEM, THAT BLOCK WILL BE SET TO AN IDENTITY MATRIX DURING THAT
 COMPUTATION. THIS COULD LEAD TO AN ARITHMETIC EXCEPTION.*
 * THE MAXIMUM NUMBER OF WARNINGS OF ONE OR MORE TYPES WAS REACHED.
 IT IS POSSIBLE THAT SOME WARNING MESSAGES WERE SUPPRESSED.

1NONLINEAR MIXED EFFECTS MODEL PROGRAM (NONMEM) VERSION 7.6.0 (nm760)
 ORIGINALLY DEVELOPED BY STUART BEAL, LEWIS SHEINER, AND ALISON BOECKMANN
 CURRENT DEVELOPERS ARE ROBERT BAUER, ICON DEVELOPMENT SOLUTIONS,
 AND ALISON BOECKMANN. IMPLEMENTATION, EFFICIENCY, AND STANDARDIZATION
 PERFORMED BY NOUS INFOSYSTEMS.
 PROBLEM NO.:         1
 PMX001 Two Compartment
 TOT. NO. OF OBS RECS:     2801
 TOT. NO. OF INDIVIDUALS:       75
 GENERAL NONLINEAR KINETICS MODEL WITH STIFF/NONSTIFF EQUATIONS (LSODA, ADVAN13)
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 #TBLN:      1
 #METH: First Order Conditional Estimation with Interaction
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
 #TERM:
0MINIMIZATION TERMINATED
 DUE TO ROUNDING ERRORS (ERROR=134)
 NO. OF FUNCTION EVALUATIONS USED:     3746
 NO. OF SIG. DIGITS IN FINAL EST.:  2.6
 ADDITIONAL PROBLEMS OCCURRED WITH THE MINIMIZATION.
 REGARD THE RESULTS OF THE ESTIMATION STEP CAREFULLY, AND ACCEPT THEM ONLY
 AFTER CHECKING THAT THE COVARIANCE STEP PRODUCES REASONABLE OUTPUT.

 ETABAR IS THE ARITHMETIC MEAN OF THE ETA-ESTIMATES,
 AND THE P-VALUE IS GIVEN FOR THE NULL HYPOTHESIS THAT THE TRUE MEAN IS 0.

 ETABAR:        -4.7516E-04 -1.7491E-03
 SE:             8.8926E-02  7.6235E-02
 N:                      75          75

 P VAL.:         9.9574E-01  9.8170E-01

 ETASHRINKSD(%)  4.1878E-01  8.1170E-01
 ETASHRINKVR(%)  8.3580E-01  1.6168E+00
 EBVSHRINKSD(%)  4.2169E-01  8.4190E-01
 EBVSHRINKVR(%)  8.4161E-01  1.6767E+00
 RELATIVEINF(%)  9.9146E+01  9.8311E+01
 EPSSHRINKSD(%)  3.9337E+00  3.9337E+00
 EPSSHRINKVR(%)  7.7127E+00  7.7127E+00


 TOTAL DATA POINTS NORMALLY DISTRIBUTED (N):         2801
 N*LOG(2PI) CONSTANT TO OBJECTIVE FUNCTION:    5147.8936630125763
 OBJECTIVE FUNCTION VALUE WITHOUT CONSTANT:    10684.861269390391
 OBJECTIVE FUNCTION VALUE WITH CONSTANT:       15832.754932402968
 REPORTED OBJECTIVE FUNCTION DOES NOT CONTAIN CONSTANT

 TOTAL EFFECTIVE ETAS (NIND*NETA):                           150


 #TERE:
 Elapsed estimation  time in seconds: 10521.30
 Elapsed postprocess time in seconds:     0.00

 ********************               FIRST ORDER CONDITIONAL ESTIMATION WITH INTERACTION              ********************
 #OBJT:**************                       MINIMUM VALUE OF OBJECTIVE FUNCTION                      ********************
 #OBJV:********************************************         10684.861       *********************************************

 ********************               FIRST ORDER CONDITIONAL ESTIMATION WITH INTERACTION              ********************
 ********************                             FINAL PARAMETER ESTIMATE                           ********************

 THETA - VECTOR OF FIXED EFFECTS PARAMETERS   *********
         TH 1      TH 2      TH 3      TH 4      TH 5      TH 6      TH 7      TH 8      TH 9      TH10      TH11      TH12
          TH13      TH14      TH15
         1.09E+00  7.34E+00  3.10E-01  2.22E+00  4.19E+00  3.50E-02 -7.90E-02  1.87E-01 -2.64E-01 -2.53E-02 -1.24E-01  1.79E-02
         -5.44E-02  2.86E-01  1.29E-01

 OMEGA - COV MATRIX FOR RANDOM EFFECTS - ETAS  ********
         ETA1      ETA2
 ETA1
+        5.98E-01
 ETA2
+        0.00E+00  4.43E-01

 SIGMA - COV MATRIX FOR RANDOM EFFECTS - EPSILONS  ****
         EPS1      EPS2
 EPS1
+        2.79E-01
 EPS2
+        0.00E+00  5.00E-13

 OMEGA - CORR MATRIX FOR RANDOM EFFECTS - ETAS  *******
         ETA1      ETA2
 ETA1
+        7.73E-01
 ETA2
+        0.00E+00  6.66E-01

 SIGMA - CORR MATRIX FOR RANDOM EFFECTS - EPSILONS  ***
         EPS1      EPS2
 EPS1
+        5.29E-01
 EPS2
+        0.00E+00  7.07E-07
 Elapsed finaloutput time in seconds:     0.00
 #CPUT: Total CPU Time in Seconds,    10491.769
