za 03 jan 2026 21:42:19 CET
;; 1. Based on: run01
;; 2. Description: PMX001 2CMT LINEAR M7+ (BASE MODEL)
;; Joshua I., Ali K.
;; 2025-12-09
$PROBLEM    PMX001 Two Compartment
$INPUT      DUMMY=DROP ID TIME WEEK DOSE=AMT RATE CONC=DROP ADA BW ALB
            SEX=DROP AGE CREAT COL EVID BLQ CONC_M7=DV
$DATA      ../../../dataset_clean.csv IGNORE=@
$ABBREVIATED DERIV2=NO
$SUBROUTINE ADVAN13 ; general nonlinear model
            TOL=9 ; tolerance for $DES,higher TOL: more accurate,but slower computation

; TOL=7 -> DES will aim for accuracy of 1E-7 for each integration step
$MODEL      NCOMP=2 ; number of compartments
            COMP=(DOSE,DEFDOSE,DEFOBS) ; first (central) compartment
            COMP=(PERIPH) ; second (peripheral) compartment
$PK
;;; V1ALB-DEFINITION START
   V1ALB = EXP(THETA(13)*(ALB - 31.85))
;;; V1ALB-DEFINITION END

;;; V1CREAT-DEFINITION START
V1CREAT = ( 1 + THETA(12)*(CREAT - 1.03))
;;; V1CREAT-DEFINITION END

;;; V1BW-DEFINITION START
IF(BW.LE.65.93) V1BW = ( 1 + THETA(10)*(BW - 65.93))
IF(BW.GT.65.93) V1BW = ( 1 + THETA(11)*(BW - 65.93))
;;; V1BW-DEFINITION END

;;; V1ADA-DEFINITION START
IF(ADA.EQ.0) V1ADA = 1  ; Most common
IF(ADA.EQ.1) V1ADA = ( 1 + THETA(9))
;;; V1ADA-DEFINITION END

;;; V1-RELATION START
V1COV=V1ADA*V1BW*V1CREAT*V1ALB
;;; V1-RELATION END

;;; CLALB-DEFINITION START
IF(ALB.LE.31.88) CLALB = ( 1 + THETA(7)*(ALB - 31.88))
IF(ALB.GT.31.88) CLALB = ( 1 + THETA(8)*(ALB - 31.88))
;;; CLALB-DEFINITION END

;;; CLAGE-DEFINITION START
CLAGE = ( 1 + THETA(6)*(AGE - 33.17))
;;; CLAGE-DEFINITION END

;;; CLADA-DEFINITION START
IF(ADA.EQ.0) CLADA = 1  ; Most common
IF(ADA.EQ.1) CLADA = ( 1 + THETA(5))
;;; CLADA-DEFINITION END

;;; CL-RELATION START
CLCOV=CLADA*CLAGE*CLALB
;;; CL-RELATION END

IF (EVID.EQ.1) LASTDOSE = TIME
TAD = TIME - LASTDOSE

TVCL = THETA(1)

TVCL = CLCOV*TVCL
TVV1 = THETA(2)

TVV1 = V1COV*TVV1
TVV2 = THETA(3)
 TVQ = THETA(4)

  CL = TVCL * EXP(ETA(1))
  V1 = TVV1 * EXP(ETA(2))
  V2 = TVV2
   Q = TVQ

 K10 = CL/V1
 K12 = Q/V1
 K21 = Q/V2

  S1 = V1/1 ; scale prediction based on DOSE (mmol) and DV (mmol/L)
  S2 = V2/1

$THETA  (0.001,1.15718,8) ; [1]   CL (L/d)
 (0.001,7.11713,10) ; [2,3] V1  (L)
 (0.01,0.326948,6) ; V2
 (0.001,2.30843,6) ; Q
 ; values are determined in 3 iterations
$THETA  (-1,4.20814,5) ; CLADA1
$THETA  (-0.050,0.0353915,0.074) ; CLAGE1
$THETA  (-100000,-0.0799371,0.084) ; CLALB1
 (-0.135,0.179142,100000) ; CLALB2
$THETA  (-1,-0.262486,5) ; V1ADA1
$THETA  (-100000,0.0166942,0.042) ; V1BW1
 (-0.055,-0.0515482,100000) ; V1BW2
$THETA  (-1.250,0.281762,1.190) ; V1CREAT1
$THETA  (-0.388950184627373,-0.0208828,0.388950184627373) ; V1ALB1
$DES DADT(1) = -K10*A(1) -K12*A(1) +K21*A(2) ; ODE for central    compartment
     DADT(2) =            K12*A(1) -K21*A(2) ; ODE for peripheral compartment

$ERROR
IPRED = F
LLOQ = 1  ; (mg/L)

; --- Residual error SDs ---
PROP_SD = SIGMA(1)
ADD_SD  = SIGMA(2)

; --- BLQ inflation (gentle, stable) ---
IF (BLQ.EQ.1) ADD_SD = ADD_SD + LLOQ

; --- Final residual error ---
W = SQRT(ADD_SD**2+PROP_SD**2)

IF (W.LE.0.000001) W=0.000001 ; Protective code

IRES=DV-IPRED
IWRES=IRES/W
Y = IPRED * (1 + EPS(1)) + EPS(2)

$OMEGA  0.596016  ;     IIV CL
 0.405319  ;      IIV V
$SIGMA  0.278943  ; EPS(1), proportional
 5E-13  FIX  ;     EPS(2)  ; additive, required by M7+ censoring method
    ; residual variability
$ESTIMATION METHOD=1 INTERACTION ; FOCE-I
            SIG=3 SIGL=4 PRINT=5 MAXEVALS=9999 CTYPE=4

NM-TRAN MESSAGES
 WARNINGS AND ERRORS (IF ANY) FOR PROBLEM    1
 (WARNING  2) NM-TRAN INFERS THAT THE DATA ARE POPULATION.
 (WARNING  79) SIGMA IS USED ON THE RIGHT. WITH A SUBSEQUENT RUN, IF AN
 INITIAL ESTIMATE OF A DIAGONAL BLOCK OF SIGMA IS TO BE COMPUTED BY
 NONMEM, THAT BLOCK WILL BE SET TO AN IDENTITY MATRIX DURING THAT
 COMPUTATION. THIS COULD LEAD TO AN ARITHMETIC EXCEPTION.*
 * THE MAXIMUM NUMBER OF WARNINGS OF ONE OR MORE TYPES WAS REACHED.
 IT IS POSSIBLE THAT SOME WARNING MESSAGES WERE SUPPRESSED.

1NONLINEAR MIXED EFFECTS MODEL PROGRAM (NONMEM) VERSION 7.6.0 (nm760)
 ORIGINALLY DEVELOPED BY STUART BEAL, LEWIS SHEINER, AND ALISON BOECKMANN
 CURRENT DEVELOPERS ARE ROBERT BAUER, ICON DEVELOPMENT SOLUTIONS,
 AND ALISON BOECKMANN. IMPLEMENTATION, EFFICIENCY, AND STANDARDIZATION
 PERFORMED BY NOUS INFOSYSTEMS.
 PROBLEM NO.:         1
 PMX001 Two Compartment
 TOT. NO. OF OBS RECS:     2801
 TOT. NO. OF INDIVIDUALS:       75
 GENERAL NONLINEAR KINETICS MODEL WITH STIFF/NONSTIFF EQUATIONS (LSODA, ADVAN13)
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 #TBLN:      1
 #METH: First Order Conditional Estimation with Interaction
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
0PRED EXIT CODE = 1
0INDIVIDUAL NO.      12   ID= 1.20000000000000E+01   (WITHIN-INDIVIDUAL) DATA REC NO. 146
 THETA=
  9.76E-01   6.12E+00   2.91E-01   2.22E+00   4.20E+00   3.58E-02  -1.81E-01   3.09E-01  -2.59E-01   2.20E-02
 -5.45E-02   2.41E-01  -1.28E-01
 OCCURS DURING SEARCH FOR ETA AT INITIAL VALUE, ETA=0
 ERROR IN LSODA: CODE  -1
0PROGRAM TERMINATED BY OBJ
 MESSAGE ISSUED FROM ESTIMATION STEP

 #TERM:

 TOTAL DATA POINTS NORMALLY DISTRIBUTED (N):          415
 N*LOG(2PI) CONSTANT TO OBJECTIVE FUNCTION:    762.71898255987833
 OBJECTIVE FUNCTION VALUE WITHOUT CONSTANT:    10728.610573081709
 OBJECTIVE FUNCTION VALUE WITH CONSTANT:       11491.329555641587
 REPORTED OBJECTIVE FUNCTION DOES NOT CONTAIN CONSTANT

 TOTAL EFFECTIVE ETAS (NIND*NETA):                            22


 #TERE:
 Elapsed estimation  time in seconds:   432.94
 #CPUT: Total CPU Time in Seconds,      427.807
