ma 05 jan 2026 12:03:59 CET
;; 1. Based on: final_backward
;; 2. Description: PMX001 2CMT LINEAR M7+ (BASE MODEL)
;; Joshua I., Ali K.
;; 2025-12-09
$PROBLEM    PMX001 Two Compartment
$INPUT      DUMMY=DROP ID TIME WEEK DOSE=AMT RATE CONC=DROP ADA BW ALB
            SEX AGE CREAT COL EVID BLQ CONC_M7=DV
$DATA      dataset_clean.csv IGNORE=@
$ABBREVIATED DERIV2=NO
$SUBROUTINE ADVAN13 ; general nonlinear model
            TOL=9 ; tolerance for $DES,higher TOL: more accurate,but slower computation

; TOL=7 -> DES will aim for accuracy of 1E-7 for each integration step
$MODEL      NCOMP=2 ; number of compartments
            COMP=(DOSE,DEFDOSE,DEFOBS) ; first (central) compartment
            COMP=(PERIPH) ; second (peripheral) compartment
$PK
;;; V1BW-DEFINITION START
IF(BW.LE.65.93) V1BW = ( 1 + THETA(9)*(BW - 65.93))
IF(BW.GT.65.93) V1BW = ( 1 + THETA(10)*(BW - 65.93))
;;; V1BW-DEFINITION END

;;; V1ALB-DEFINITION START
V1ALB = ( 1 + THETA(8)*(ALB - 31.85))
;;; V1ALB-DEFINITION END

;;; V1-RELATION START
V1COV=V1ALB*V1BW
;;; V1-RELATION END

;;; CLALB-DEFINITION START
IF(ALB.LE.31.88) CLALB = ( 1 + THETA(6)*(ALB - 31.88))
IF(ALB.GT.31.88) CLALB = ( 1 + THETA(7)*(ALB - 31.88))
;;; CLALB-DEFINITION END

;;; CLADA-DEFINITION START
IF(ADA.EQ.0) CLADA = 1  ; Most common
IF(ADA.EQ.1) CLADA = ( 1 + THETA(5))
;;; CLADA-DEFINITION END

;;; CL-RELATION START
CLCOV=CLADA*CLALB
;;; CL-RELATION END

IF (EVID.EQ.1) LASTDOSE = TIME
TAD = TIME - LASTDOSE

TVCL = THETA(1)

TVCL = CLCOV*TVCL
TVV1 = THETA(2)

TVV1 = V1COV*TVV1
TVV2 = THETA(3)
 TVQ = THETA(4)

  CL = TVCL * EXP(ETA(1))
  V1 = TVV1 * EXP(ETA(2))
  V2 = TVV2
   Q = TVQ

 K10 = CL/V1
 K12 = Q/V1
 K21 = Q/V2

  S1 = V1/1 ; scale prediction based on DOSE (mmol) and DV (mmol/L)
  S2 = V2/1

$THETA  (0.001,0.997,4) ; [1]   CL (L/d)
 (0.001,6.66,10) ; [2,3] V1  (L)
 (0.01,0.251,2) ; V2
 (0.001,1.93,3) ; Q
 (-1,4.61,10) ; CLADA
 (-2,-0.127,0.4) ; CLALB1
 (-0.135,0.313,10) ; CLALB2
 (-0.134,-0.123,0.4) ; V1ALB
 (-2,0.0206,0.4) ; V1BW1
 (-0.055,-0.0544,0.4) ; V1BW2
 ; values are determined in 3 iterations
$DES DADT(1) = -K10*A(1) -K12*A(1) +K21*A(2) ; ODE for central    compartment
     DADT(2) =            K12*A(1) -K21*A(2) ; ODE for peripheral compartment

$ERROR
IPRED = F
LLOQ = 1  ; (mg/L)

; --- Residual error SDs ---
PROP_SD = SIGMA(1)
ADD_SD  = SIGMA(2)

; --- BLQ inflation (gentle, stable) ---
IF (BLQ.EQ.1) ADD_SD = ADD_SD + LLOQ

; --- Final residual error ---
W = SQRT(ADD_SD**2+PROP_SD**2)

IF (W.LE.0.000001) W=0.000001 ; Protective code

IRES=DV-IPRED
IWRES=IRES/W
Y = IPRED * (1 + EPS(1)) + EPS(2)

$OMEGA  0.694  ;     IIV CL
 0.522  ;      IIV V
$SIGMA  0.285  ;     EPS(1)  ; proportional
 5E-13  FIX  ;     EPS(2)  ; additive, required by M7+ censoring method
    ; residual variability
$ESTIMATION METHOD=1 INTERACTION ; FOCE-I
            MAXEVAL=9999 SIG=3 PRINT=5
$COVARIANCE PRINT=E UNCONDITIONAL MATRIX=S
 ; output table for standard outcomes
$TABLE      ID TIME TAD DV EVID PRED IPRED WRES IWRES RES IRES CWRES
            NOPRINT ONEHEADER FILE=backward2_sdtab
 ; output table for PK parameters
$TABLE      ID CL V1 V2 Q K10 K12 K21 NOPRINT NOAPPEND ONEHEADER
            FILE=backward2_patab
 ; output table for categorical covariates
$TABLE      ID ADA SEX COL NOPRINT NOAPPEND ONEHEADER
            FILE=backward2_catab
 ; output table for continuous covariates
$TABLE      ID BW ALB AGE CREAT NOPRINT NOAPPEND ONEHEADER
            FILE=backward2_cotab
 ; output table for parameters and covariates
$TABLE

NM-TRAN MESSAGES
 WARNINGS AND ERRORS (IF ANY) FOR PROBLEM    1
 (WARNING  2) NM-TRAN INFERS THAT THE DATA ARE POPULATION.
 (WARNING  79) SIGMA IS USED ON THE RIGHT. WITH A SUBSEQUENT RUN, IF AN
 INITIAL ESTIMATE OF A DIAGONAL BLOCK OF SIGMA IS TO BE COMPUTED BY
 NONMEM, THAT BLOCK WILL BE SET TO AN IDENTITY MATRIX DURING THAT
 COMPUTATION. THIS COULD LEAD TO AN ARITHMETIC EXCEPTION.*
 * THE MAXIMUM NUMBER OF WARNINGS OF ONE OR MORE TYPES WAS REACHED.
 IT IS POSSIBLE THAT SOME WARNING MESSAGES WERE SUPPRESSED.

1NONLINEAR MIXED EFFECTS MODEL PROGRAM (NONMEM) VERSION 7.6.0 (nm760)
 ORIGINALLY DEVELOPED BY STUART BEAL, LEWIS SHEINER, AND ALISON BOECKMANN
 CURRENT DEVELOPERS ARE ROBERT BAUER, ICON DEVELOPMENT SOLUTIONS,
 AND ALISON BOECKMANN. IMPLEMENTATION, EFFICIENCY, AND STANDARDIZATION
 PERFORMED BY NOUS INFOSYSTEMS.
 PROBLEM NO.:         1
 PMX001 Two Compartment
 TOT. NO. OF OBS RECS:     2801
 TOT. NO. OF INDIVIDUALS:       75
 GENERAL NONLINEAR KINETICS MODEL WITH STIFF/NONSTIFF EQUATIONS (LSODA, ADVAN13)
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 #TBLN:      1
 #METH: First Order Conditional Estimation with Interaction
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
 #TERM:
0MINIMIZATION TERMINATED
 DUE TO ROUNDING ERRORS (ERROR=134)
 NO. OF FUNCTION EVALUATIONS USED:      590
 NO. OF SIG. DIGITS IN FINAL EST.:  2.7

 ETABAR IS THE ARITHMETIC MEAN OF THE ETA-ESTIMATES,
 AND THE P-VALUE IS GIVEN FOR THE NULL HYPOTHESIS THAT THE TRUE MEAN IS 0.

 ETABAR:         1.8625E-04 -6.9990E-05
 SE:             9.5799E-02  8.2802E-02
 N:                      75          75

 P VAL.:         9.9845E-01  9.9933E-01

 ETASHRINKSD(%)  3.8142E-01  7.0551E-01
 ETASHRINKVR(%)  7.6139E-01  1.4060E+00
 EBVSHRINKSD(%)  3.7215E-01  7.0841E-01
 EBVSHRINKVR(%)  7.4291E-01  1.4118E+00
 RELATIVEINF(%)  9.9248E+01  9.8579E+01
 EPSSHRINKSD(%)  3.9345E+00  3.9345E+00
 EPSSHRINKVR(%)  7.7143E+00  7.7143E+00


 TOTAL DATA POINTS NORMALLY DISTRIBUTED (N):         2801
 N*LOG(2PI) CONSTANT TO OBJECTIVE FUNCTION:    5147.8936630125763
 OBJECTIVE FUNCTION VALUE WITHOUT CONSTANT:    10711.838392807331
 OBJECTIVE FUNCTION VALUE WITH CONSTANT:       15859.732055819906
 REPORTED OBJECTIVE FUNCTION DOES NOT CONTAIN CONSTANT

 TOTAL EFFECTIVE ETAS (NIND*NETA):                           150


 #TERE:
 Elapsed estimation  time in seconds:  2305.40
 Elapsed covariance  time in seconds:   217.68
 Elapsed postprocess time in seconds:     9.78

 ********************               FIRST ORDER CONDITIONAL ESTIMATION WITH INTERACTION              ********************
 #OBJT:**************                       MINIMUM VALUE OF OBJECTIVE FUNCTION                      ********************
 #OBJV:********************************************         10711.838       *********************************************

 ********************               FIRST ORDER CONDITIONAL ESTIMATION WITH INTERACTION              ********************
 ********************                             FINAL PARAMETER ESTIMATE                           ********************

 THETA - VECTOR OF FIXED EFFECTS PARAMETERS   *********
         TH 1      TH 2      TH 3      TH 4      TH 5      TH 6      TH 7      TH 8      TH 9      TH10
         9.97E-01  6.66E+00  2.51E-01  1.93E+00  4.61E+00 -1.27E-01  3.13E-01 -1.23E-01  2.06E-02 -5.44E-02

 OMEGA - COV MATRIX FOR RANDOM EFFECTS - ETAS  ********
         ETA1      ETA2
 ETA1
+        6.94E-01
 ETA2
+        0.00E+00  5.22E-01

 SIGMA - COV MATRIX FOR RANDOM EFFECTS - EPSILONS  ****
         EPS1      EPS2
 EPS1
+        2.85E-01
 EPS2
+        0.00E+00  5.00E-13

 OMEGA - CORR MATRIX FOR RANDOM EFFECTS - ETAS  *******
         ETA1      ETA2
 ETA1
+        8.33E-01
 ETA2
+        0.00E+00  7.22E-01

 SIGMA - CORR MATRIX FOR RANDOM EFFECTS - EPSILONS  ***
         EPS1      EPS2
 EPS1
+        5.33E-01
 EPS2
+        0.00E+00  7.07E-07

 ********************               FIRST ORDER CONDITIONAL ESTIMATION WITH INTERACTION              ********************
 ********************                            STANDARD ERROR OF ESTIMATE                          ********************

 THETA - VECTOR OF FIXED EFFECTS PARAMETERS   *********
         TH 1      TH 2      TH 3      TH 4      TH 5      TH 6      TH 7      TH 8      TH 9      TH10
         1.84E-01  8.12E-01  3.54E-01  7.25E+00  2.32E-01  2.08E-02  1.95E-02  5.06E-03  5.84E-03  2.30E-03

 OMEGA - COV MATRIX FOR RANDOM EFFECTS - ETAS  ********
         ETA1      ETA2
 ETA1
+        2.02E-01
 ETA2
+       .........  1.18E-01

 SIGMA - COV MATRIX FOR RANDOM EFFECTS - EPSILONS  ****
         EPS1      EPS2
 EPS1
+        1.52E-02
 EPS2
+       ......... .........

 OMEGA - CORR MATRIX FOR RANDOM EFFECTS - ETAS  *******
         ETA1      ETA2
 ETA1
+        1.22E-01
 ETA2
+       .........  8.14E-02

 SIGMA - CORR MATRIX FOR RANDOM EFFECTS - EPSILONS  ***
         EPS1      EPS2
 EPS1
+        1.42E-02
 EPS2
+       ......... .........

 ********************               FIRST ORDER CONDITIONAL ESTIMATION WITH INTERACTION              ********************
 ********************                          COVARIANCE MATRIX OF ESTIMATE                         ********************

            TH 1      TH 2      TH 3      TH 4      TH 5      TH 6      TH 7      TH 8      TH 9      TH10      OM11      OM12
             OM22      SG11      SG12      SG22
 TH 1
+        3.40E-02
 TH 2
+        8.74E-03  6.60E-01
 TH 3
+       -1.84E-02 -5.78E-02  1.26E-01
 TH 4
+       -5.54E-01 -1.76E+00  2.50E+00  5.25E+01
 TH 5
+       -1.93E-03  5.10E-02 -5.99E-03 -2.14E-01  5.39E-02
 TH 6
+        5.87E-05 -4.47E-04  3.79E-03  7.23E-02 -1.61E-05  4.32E-04
 TH 7
+       -4.79E-05  3.30E-03  4.23E-04 -3.24E-03  4.92E-04 -4.51E-05  3.80E-04
 TH 8
+        2.12E-04  8.47E-04 -1.13E-03 -2.42E-02  1.84E-04 -2.89E-05  3.45E-05  2.57E-05
 TH 9
+       -1.63E-05  6.47E-04  7.07E-04  1.39E-02  7.05E-05  1.28E-05  2.39E-07 -4.73E-06  3.41E-05
 TH10
+        5.69E-05 -4.99E-05 -5.36E-04 -9.99E-03 -2.46E-05 -1.95E-05 -3.88E-06  4.15E-06 -2.98E-06  5.28E-06
 OM11
+        9.22E-03 -4.19E-02 -4.75E-04  8.14E-02 -1.42E-02  9.28E-05 -1.37E-03 -3.76E-04  8.34E-05  6.84E-05  4.10E-02
 OM12
+       ......... ......... ......... ......... ......... ......... ......... ......... ......... ......... ......... .........
 OM22
+       -3.00E-03 -4.27E-02  2.49E-03  1.37E-01 -4.44E-03 -1.26E-04 -3.32E-04 -1.23E-04 -4.64E-05  8.52E-06  2.48E-03 .........
          1.38E-02
 SG11
+       -3.76E-04  5.12E-03  9.77E-04  1.03E-02  1.20E-03  6.93E-05  4.71E-05  2.21E-06 -4.06E-06 -1.11E-05 -1.68E-03 .........
         -3.65E-04  2.30E-04
 SG12
+       ......... ......... ......... ......... ......... ......... ......... ......... ......... ......... ......... .........
         ......... ......... .........
 SG22
+       ......... ......... ......... ......... ......... ......... ......... ......... ......... ......... ......... .........
         ......... ......... ......... .........

 ********************               FIRST ORDER CONDITIONAL ESTIMATION WITH INTERACTION              ********************
 ********************                          CORRELATION MATRIX OF ESTIMATE                        ********************

            TH 1      TH 2      TH 3      TH 4      TH 5      TH 6      TH 7      TH 8      TH 9      TH10      OM11      OM12
             OM22      SG11      SG12      SG22
 TH 1
+        1.84E-01
 TH 2
+        5.83E-02  8.12E-01
 TH 3
+       -2.82E-01 -2.01E-01  3.54E-01
 TH 4
+       -4.14E-01 -3.00E-01  9.72E-01  7.25E+00
 TH 5
+       -4.51E-02  2.71E-01 -7.28E-02 -1.27E-01  2.32E-01
 TH 6
+        1.53E-02 -2.64E-02  5.14E-01  4.80E-01 -3.33E-03  2.08E-02
 TH 7
+       -1.33E-02  2.08E-01  6.12E-02 -2.29E-02  1.09E-01 -1.11E-01  1.95E-02
 TH 8
+        2.27E-01  2.06E-01 -6.28E-01 -6.59E-01  1.57E-01 -2.75E-01  3.50E-01  5.06E-03
 TH 9
+       -1.51E-02  1.36E-01  3.42E-01  3.27E-01  5.20E-02  1.06E-01  2.10E-03 -1.60E-01  5.84E-03
 TH10
+        1.34E-01 -2.68E-02 -6.59E-01 -6.00E-01 -4.61E-02 -4.08E-01 -8.65E-02  3.56E-01 -2.22E-01  2.30E-03
 OM11
+        2.47E-01 -2.55E-01 -6.61E-03  5.55E-02 -3.02E-01  2.21E-02 -3.48E-01 -3.67E-01  7.06E-02  1.47E-01  2.02E-01
 OM12
+       ......... ......... ......... ......... ......... ......... ......... ......... ......... ......... ......... .........
 OM22
+       -1.38E-01 -4.47E-01  5.98E-02  1.61E-01 -1.63E-01 -5.17E-02 -1.45E-01 -2.07E-01 -6.76E-02  3.16E-02  1.04E-01 .........
          1.18E-01
 SG11
+       -1.34E-01  4.16E-01  1.82E-01  9.35E-02  3.41E-01  2.20E-01  1.59E-01  2.88E-02 -4.58E-02 -3.20E-01 -5.46E-01 .........
         -2.05E-01  1.52E-02
 SG12
+       ......... ......... ......... ......... ......... ......... ......... ......... ......... ......... ......... .........
         ......... ......... .........
 SG22
+       ......... ......... ......... ......... ......... ......... ......... ......... ......... ......... ......... .........
         ......... ......... ......... .........
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
 ********************               FIRST ORDER CONDITIONAL ESTIMATION WITH INTERACTION              ********************
 ********************                      EIGENVALUES OF COR MATRIX OF ESTIMATE                     ********************

             1         2         3         4         5         6         7         8         9        10        11        12
             13
         6.41E-03  1.69E-01  2.72E-01  3.98E-01  5.03E-01  6.02E-01  6.45E-01  8.03E-01  9.83E-01  1.06E+00  1.37E+00  2.57E+00
          3.62E+00
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 Elapsed finaloutput time in seconds:     0.63
 #CPUT: Total CPU Time in Seconds,     2536.729
