ma 05 jan 2026 18:06:03 CET
;; 1. Based on: run02
;; 2. Description: PMX001 2CMT LINEAR M7+ (BASE MODEL)
;; Joshua I., Ali K.
;; 2025-12-09
$PROBLEM    PMX001 Two Compartment
$INPUT      DUMMY=DROP ID TIME WEEK DOSE=AMT RATE CONC=DROP ADA BW ALB
            SEX AGE CREAT COL EVID BLQ CONC_M7=DV
$DATA      dataset_clean.csv IGNORE=@
$ABBREVIATED DERIV2=NO
$SUBROUTINE ADVAN13 ; general nonlinear model
            TOL=9 ; tolerance for $DES,higher TOL: more accurate,but slower computation
$MODEL      NCOMP=2 ; number of compartments
            COMP=(DOSE,DEFDOSE,DEFOBS) ; first (central) compartment
            COMP=(PERIPH) ; second (peripheral) compartment
$PK
;; time after dose
IF (EVID.EQ.1) LASTDOSE = TIME
TAD = TIME - LASTDOSE

;; typical values
TVCL = THETA(1)
TVV1 = THETA(2)
TVV2 = THETA(3)
 TVQ = THETA(4)

;; covariates on V1
IF(ADA.EQ.0)    V1ADA =  1                          ; ADA=0: most common
IF(ADA.EQ.1)    V1ADA = (1 + THETA(5))              ; ADA=1
IF(BW.LE.65.97) V1BW  = (1 + THETA(6)*(BW - 65.97)) ; BW below median
IF(BW.GT.65.97) V1BW  = (1 + THETA(7)*(BW - 65.97)) ; BW above median

;; individual values
  CL = TVCL
  V1 = TVV1 * EXP(ETA(1)) * V1ADA * V1BW
  V2 = TVV2
   Q = TVQ

 K10 = CL/V1
 K12 = Q/V1
 K21 = Q/V2

  S1 = V1/1 ; scale prediction based on DOSE (mmol) and DV (mmol/L)
  S2 = V2/1

$THETA  (0.001,0.919,5) ; [1] TVCL (L/d)
 (0.001,3.1,8) ; [2,3] TVV1 (L)
 (0.01,0.154,3) ; TVV2
 (0.001,20.4,30) ; TVQ
 (-1,-0.888,5) ; V1ADA
 (-100,0.0285,0.042) ; V1BW1
 (-0.055,-0.0544,100) ; V1BW2
 ; values are determined in 3 iterations
$DES DADT(1) = -K10*A(1) -K12*A(1) +K21*A(2) ; ODE for central    compartment
     DADT(2) =            K12*A(1) -K21*A(2) ; ODE for peripheral compartment

$ERROR
IPRED = F
LLOQ = 1  ; (mg/L)

; --- Residual error SDs ---
PROP_SD = SIGMA(1)
ADD_SD  = SIGMA(2)

; --- BLQ inflation (gentle, stable) ---
IF (BLQ.EQ.1) ADD_SD = ADD_SD + LLOQ

; --- Final residual error ---
W = SQRT(ADD_SD**2+PROP_SD**2)

IF (W.LE.0.000001) W=0.000001 ; Protective code

IRES=DV-IPRED
IWRES=IRES/W
Y = IPRED * (1 + EPS(1)) + EPS(2)

$OMEGA  0.768  ;     IIV V1
$SIGMA  1.27  ;     EPS(1)  ; proportional
 5E-13  FIX  ;     EPS(2)  ; additive, required by M7+ censoring method
    ; residual variability
$ESTIMATION METHOD=1 INTERACTION ; FOCE-I
            MAXEVAL=9999 SIG=3 SIGL=3 PRINT=5
$COVARIANCE PRINT=E UNCONDITIONAL MATRIX=S
 ; output table for standard outcomes
$TABLE      ID TIME TAD DV EVID PRED IPRED WRES IWRES RES IRES CWRES
            NOPRINT ONEHEADER FILE=finalbw1_sdtab
 ; output table for PK parameters
$TABLE      ID CL V1 V2 Q K10 K12 K21 NOPRINT NOAPPEND ONEHEADER
            FILE=finalbw1_patab
 ; output table for categorical covariates
$TABLE      ID ADA SEX COL NOPRINT NOAPPEND ONEHEADER
            FILE=finalbw1_catab
 ; output table for continuous covariates
$TABLE      ID BW ALB AGE CREAT NOPRINT NOAPPEND ONEHEADER
            FILE=finalbw1_cotab
 ; output table for parameters and covariates
$TABLE      ID CL V1 V2 Q K10 K12 K21 ADA SEX COL BW ALB AGE CREAT
            NOPRINT NOAPPEND ONEHEADER FILE=finalbw1_pa_cov
;; REFERENCES

;; 1) https://www.ncbi.nlm.nih.gov/books/NBK557889/

;; 2) https://pmc.ncbi.nlm.nih.gov/articles/PMC8301575/

;; 3) https://ascpt.onlinelibrary.wiley.com/doi/abs/10.1016/j.clpt.2004.12.212

NM-TRAN MESSAGES
 WARNINGS AND ERRORS (IF ANY) FOR PROBLEM    1
 (WARNING  2) NM-TRAN INFERS THAT THE DATA ARE POPULATION.
 (WARNING  79) SIGMA IS USED ON THE RIGHT. WITH A SUBSEQUENT RUN, IF AN
 INITIAL ESTIMATE OF A DIAGONAL BLOCK OF SIGMA IS TO BE COMPUTED BY
 NONMEM, THAT BLOCK WILL BE SET TO AN IDENTITY MATRIX DURING THAT
 COMPUTATION. THIS COULD LEAD TO AN ARITHMETIC EXCEPTION.*
 * THE MAXIMUM NUMBER OF WARNINGS OF ONE OR MORE TYPES WAS REACHED.
 IT IS POSSIBLE THAT SOME WARNING MESSAGES WERE SUPPRESSED.

1NONLINEAR MIXED EFFECTS MODEL PROGRAM (NONMEM) VERSION 7.6.0 (nm760)
 ORIGINALLY DEVELOPED BY STUART BEAL, LEWIS SHEINER, AND ALISON BOECKMANN
 CURRENT DEVELOPERS ARE ROBERT BAUER, ICON DEVELOPMENT SOLUTIONS,
 AND ALISON BOECKMANN. IMPLEMENTATION, EFFICIENCY, AND STANDARDIZATION
 PERFORMED BY NOUS INFOSYSTEMS.
 PROBLEM NO.:         1
 PMX001 Two Compartment
 TOT. NO. OF OBS RECS:     2801
 TOT. NO. OF INDIVIDUALS:       75
 GENERAL NONLINEAR KINETICS MODEL WITH STIFF/NONSTIFF EQUATIONS (LSODA, ADVAN13)
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 #TBLN:      1
 #METH: First Order Conditional Estimation with Interaction
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
 #TERM:
0MINIMIZATION TERMINATED
 DUE TO ROUNDING ERRORS (ERROR=134)
 NO. OF FUNCTION EVALUATIONS USED:      559
 NO. OF SIG. DIGITS IN FINAL EST.:  1.7
 ADDITIONAL PROBLEMS OCCURRED WITH THE MINIMIZATION.
 REGARD THE RESULTS OF THE ESTIMATION STEP CAREFULLY, AND ACCEPT THEM ONLY
 AFTER CHECKING THAT THE COVARIANCE STEP PRODUCES REASONABLE OUTPUT.

 ETABAR IS THE ARITHMETIC MEAN OF THE ETA-ESTIMATES,
 AND THE P-VALUE IS GIVEN FOR THE NULL HYPOTHESIS THAT THE TRUE MEAN IS 0.

 ETABAR:         1.5645E-02
 SE:             1.0112E-01
 N:                      75

 P VAL.:         8.7704E-01

 ETASHRINKSD(%)  1.2931E-01
 ETASHRINKVR(%)  2.5846E-01
 EBVSHRINKSD(%)  7.7253E-02
 EBVSHRINKVR(%)  1.5445E-01
 RELATIVEINF(%)  9.9846E+01
 EPSSHRINKSD(%)  3.4256E+00  3.4256E+00
 EPSSHRINKVR(%)  6.7339E+00  6.7339E+00


 TOTAL DATA POINTS NORMALLY DISTRIBUTED (N):         2801
 N*LOG(2PI) CONSTANT TO OBJECTIVE FUNCTION:    5147.8936630125763
 OBJECTIVE FUNCTION VALUE WITHOUT CONSTANT:    14951.075786908479
 OBJECTIVE FUNCTION VALUE WITH CONSTANT:       20098.969449921056
 REPORTED OBJECTIVE FUNCTION DOES NOT CONTAIN CONSTANT

 TOTAL EFFECTIVE ETAS (NIND*NETA):                            75


 #TERE:
 Elapsed estimation  time in seconds:  2382.34
 Elapsed covariance  time in seconds:   163.94
 Elapsed postprocess time in seconds:    10.19

 ********************               FIRST ORDER CONDITIONAL ESTIMATION WITH INTERACTION              ********************
 #OBJT:**************                       MINIMUM VALUE OF OBJECTIVE FUNCTION                      ********************
 #OBJV:********************************************         14951.076       *********************************************

 ********************               FIRST ORDER CONDITIONAL ESTIMATION WITH INTERACTION              ********************
 ********************                             FINAL PARAMETER ESTIMATE                           ********************

 THETA - VECTOR OF FIXED EFFECTS PARAMETERS   *********
         TH 1      TH 2      TH 3      TH 4      TH 5      TH 6      TH 7
         9.18E-01  3.11E+00  1.55E-01  2.04E+01 -8.88E-01  2.84E-02 -5.44E-02

 OMEGA - COV MATRIX FOR RANDOM EFFECTS - ETAS  ********
         ETA1
 ETA1
+        7.69E-01

 SIGMA - COV MATRIX FOR RANDOM EFFECTS - EPSILONS  ****
         EPS1      EPS2
 EPS1
+        1.27E+00
 EPS2
+        0.00E+00  5.00E-13

 OMEGA - CORR MATRIX FOR RANDOM EFFECTS - ETAS  *******
         ETA1
 ETA1
+        8.77E-01

 SIGMA - CORR MATRIX FOR RANDOM EFFECTS - EPSILONS  ***
         EPS1      EPS2
 EPS1
+        1.13E+00
 EPS2
+        0.00E+00  7.07E-07

 ********************               FIRST ORDER CONDITIONAL ESTIMATION WITH INTERACTION              ********************
 ********************                            STANDARD ERROR OF ESTIMATE                          ********************

 THETA - VECTOR OF FIXED EFFECTS PARAMETERS   *********
         TH 1      TH 2      TH 3      TH 4      TH 5      TH 6      TH 7
         1.52E-02  5.39E-01  4.91E-02  1.96E+02  8.24E-03  2.32E-03  1.57E-03

 OMEGA - COV MATRIX FOR RANDOM EFFECTS - ETAS  ********
         ETA1
 ETA1
+        1.58E-01

 SIGMA - COV MATRIX FOR RANDOM EFFECTS - EPSILONS  ****
         EPS1      EPS2
 EPS1
+        5.53E-02
 EPS2
+       ......... .........

 OMEGA - CORR MATRIX FOR RANDOM EFFECTS - ETAS  *******
         ETA1
 ETA1
+        9.00E-02

 SIGMA - CORR MATRIX FOR RANDOM EFFECTS - EPSILONS  ***
         EPS1      EPS2
 EPS1
+        2.45E-02
 EPS2
+       ......... .........

 ********************               FIRST ORDER CONDITIONAL ESTIMATION WITH INTERACTION              ********************
 ********************                          COVARIANCE MATRIX OF ESTIMATE                         ********************

            TH 1      TH 2      TH 3      TH 4      TH 5      TH 6      TH 7      OM11      SG11      SG12      SG22
 TH 1
+        2.30E-04
 TH 2
+        6.41E-03  2.90E-01
 TH 3
+       -1.60E-05 -2.39E-03  2.41E-03
 TH 4
+       -3.70E-01 -1.19E+01  5.16E+00  3.82E+04
 TH 5
+        2.27E-05  8.25E-04 -2.91E-04 -4.23E-01  6.79E-05
 TH 6
+        2.59E-06  1.90E-04  1.16E-05  2.37E-02 -1.26E-06  5.38E-06
 TH 7
+        5.08E-07 -8.61E-06 -1.27E-05 -2.48E-02  1.64E-06 -5.26E-08  2.46E-06
 OM11
+       -3.96E-04 -1.57E-02  1.18E-03  3.79E+00 -2.11E-04 -4.21E-06 -1.07E-04  2.49E-02
 SG11
+        8.31E-04  2.24E-02  4.26E-05 -5.70E-01  7.45E-05  6.68E-06  1.38E-06 -1.44E-03  3.06E-03
 SG12
+       ......... ......... ......... ......... ......... ......... ......... ......... ......... .........
 SG22
+       ......... ......... ......... ......... ......... ......... ......... ......... ......... ......... .........

 ********************               FIRST ORDER CONDITIONAL ESTIMATION WITH INTERACTION              ********************
 ********************                          CORRELATION MATRIX OF ESTIMATE                        ********************

            TH 1      TH 2      TH 3      TH 4      TH 5      TH 6      TH 7      OM11      SG11      SG12      SG22
 TH 1
+        1.52E-02
 TH 2
+        7.83E-01  5.39E-01
 TH 3
+       -2.14E-02 -9.05E-02  4.91E-02
 TH 4
+       -1.25E-01 -1.13E-01  5.37E-01  1.96E+02
 TH 5
+        1.82E-01  1.86E-01 -7.18E-01 -2.63E-01  8.24E-03
 TH 6
+        7.36E-02  1.52E-01  1.02E-01  5.24E-02 -6.60E-02  2.32E-03
 TH 7
+        2.14E-02 -1.02E-02 -1.65E-01 -8.10E-02  1.27E-01 -1.45E-02  1.57E-03
 OM11
+       -1.65E-01 -1.85E-01  1.53E-01  1.23E-01 -1.62E-01 -1.15E-02 -4.33E-01  1.58E-01
 SG11
+        9.90E-01  7.54E-01  1.57E-02 -5.27E-02  1.64E-01  5.21E-02  1.59E-02 -1.65E-01  5.53E-02
 SG12
+       ......... ......... ......... ......... ......... ......... ......... ......... ......... .........
 SG22
+       ......... ......... ......... ......... ......... ......... ......... ......... ......... ......... .........
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
 ********************               FIRST ORDER CONDITIONAL ESTIMATION WITH INTERACTION              ********************
 ********************                      EIGENVALUES OF COR MATRIX OF ESTIMATE                     ********************

             1         2         3         4         5         6         7         8         9
         5.87E-03  1.89E-01  2.94E-01  5.52E-01  7.50E-01  9.74E-01  1.28E+00  2.04E+00  2.91E+00
 Elapsed finaloutput time in seconds:     1.22
 #CPUT: Total CPU Time in Seconds,     2517.955
