do 08 jan 2026 22:18:51 CET
;; 1. Based on: run13
;; 2. Description: PMX001 2CMT TMDD M7+ (BASE)
;; Joshua I., Ali K.
;; 2025-12-09
$PROBLEM    PMX001 Two Compartment TMDD Model
;; 2 assumptions:

;; 1. Free ligand concentration is much larger than total target concentration.

;; 2. Vmax = cst => Rtot = cst => target degradation rate (kout) = ligand-target complex internalization rate (kint)
$INPUT      DUMMY=DROP ID TIME WEEK DOSE=AMT RATE CONC=DROP ADA=DROP
            BW=DROP ALB SEX AGE=DROP CREAT=DROP COL EVID BLQ
            CONC_M7=DV
$DATA      ../../../dataset_clean.csv IGNORE=@
$ABBREVIATED DERIV2=NO
$SUBROUTINE ADVAN13 ; general nonlinear model
            TOL=5 ; tolerance for $DES,higher TOL: more accurate,but slower computation

; TOL=7 -> DES will aim for accuracy of 1E-7 for each integration step
$MODEL      NCOMP=2 ; number of compartments
            COMP=(DOSE,DEFDOSE,DEFOBS) ; first (central) compartment
            COMP=(PERIPH) ; second (peripheral) compartment
$PK
;;; CLSEX-DEFINITION START
IF(SEX.EQ.1) CLSEX = 1  ; Most common
IF(SEX.EQ.0) CLSEX = ( 1 + THETA(8))
;;; CLSEX-DEFINITION END

;;; CLALB-DEFINITION START
   CLALB = ((ALB/31.85)**THETA(7))
;;; CLALB-DEFINITION END

;;; CL-RELATION START
CLCOV=CLALB*CLSEX
;;; CL-RELATION END

IF (EVID.EQ.1) LASTDOSE = TIME
TAD = TIME - LASTDOSE

  TVCL = THETA(1)

TVCL = CLCOV*TVCL
TVVMAX = THETA(2)
  TVKM = THETA(3)
  TVV1 = THETA(4)
  TVV2 = THETA(5)
   TVQ = THETA(6)

  CL = TVCL   * EXP(ETA(1))
VMAX = TVVMAX
  KM = TVKM
  V1 = TVV1
  V2 = TVV2
   Q = TVQ

 K10 = CL/V1
 K12 = Q/V1
 K21 = Q/V2

  S1 = V1/1 ; scale prediction based on DOSE (mmol) and DV (mmol/L)
  S2 = V2/1

$THETA  (0.01,1.07729922890643,2.3) ; [1] CL (L/d)
 (0.5,1.35037135559889,3) ; VMAX
 (0.001,0.00720681576078251,0.02) ; KM
 (0.5,4.21455799099761,9) ; [2,3] V1 (L)
 (0.00001,0.000293346793441284,0.0006) ; V2
 (0.1,12.8842623818081,30) ; Q
 ; values are determined in 3 iterations
$THETA  (-100,-1.35823942979375,100000) ; CLALB1
$THETA  (-1,-0.00104259357427361,5) ; CLSEX1
$DES DADT(1) = -K10*A(1) -K12*A(1) +K21*A(2) -VMAX*A(1)/(KM*V1 + A(1)) ; ODE central    compartment
     DADT(2) =            K12*A(1) -K21*A(2)                           ; ODE peripheral compartment

$ERROR
IPRED = F
LLOQ = 1  ; (mg/L)

; --- Residual error SDs ---
PROP_SD = SIGMA(1)
ADD_SD  = SIGMA(2)

; --- BLQ inflation (gentle, stable) ---
IF (BLQ.EQ.1) ADD_SD = ADD_SD + LLOQ

; --- Final residual error ---
W = SQRT(ADD_SD**2+PROP_SD**2)

IF (W.LE.0.000001) W=0.000001 ; Protective code

IRES=DV-IPRED
IWRES=IRES/W
Y = IPRED * (1 + EPS(1)) + EPS(2)

$OMEGA  0.367856176142922  ;     IIV CL
$SIGMA  0.34083956957118  ; EPS(1), proportional
 1E-13  FIX  ;     EPS(2)  ; additive, required by M7+ censoring method
    ; residual variability
$ESTIMATION METHOD=1 INTERACTION ; FOCE-I
            SIG=3 SIGL=3 PRINT=5 MAXEVALS=303 CTYPE=4

NM-TRAN MESSAGES
 WARNINGS AND ERRORS (IF ANY) FOR PROBLEM    1
 (WARNING  2) NM-TRAN INFERS THAT THE DATA ARE POPULATION.
 (WARNING  79) SIGMA IS USED ON THE RIGHT. WITH A SUBSEQUENT RUN, IF AN
 INITIAL ESTIMATE OF A DIAGONAL BLOCK OF SIGMA IS TO BE COMPUTED BY
 NONMEM, THAT BLOCK WILL BE SET TO AN IDENTITY MATRIX DURING THAT
 COMPUTATION. THIS COULD LEAD TO AN ARITHMETIC EXCEPTION.*
 * THE MAXIMUM NUMBER OF WARNINGS OF ONE OR MORE TYPES WAS REACHED.
 IT IS POSSIBLE THAT SOME WARNING MESSAGES WERE SUPPRESSED.

1NONLINEAR MIXED EFFECTS MODEL PROGRAM (NONMEM) VERSION 7.6.0 (nm760)
 ORIGINALLY DEVELOPED BY STUART BEAL, LEWIS SHEINER, AND ALISON BOECKMANN
 CURRENT DEVELOPERS ARE ROBERT BAUER, ICON DEVELOPMENT SOLUTIONS,
 AND ALISON BOECKMANN. IMPLEMENTATION, EFFICIENCY, AND STANDARDIZATION
 PERFORMED BY NOUS INFOSYSTEMS.
 PROBLEM NO.:         1
 PMX001 Two Compartment TMDD Model
 TOT. NO. OF OBS RECS:     2801
 TOT. NO. OF INDIVIDUALS:       75
 GENERAL NONLINEAR KINETICS MODEL WITH STIFF/NONSTIFF EQUATIONS (LSODA, ADVAN13)
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 #TBLN:      1
 #METH: First Order Conditional Estimation with Interaction
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
 #TERM:
0MINIMIZATION TERMINATED
 DUE TO PROXIMITY OF LAST ITERATION EST. TO A VALUE
 AT WHICH THE OBJ. FUNC. IS INFINITE (ERROR=136)
0AT THE LAST COMPUTED INFINITE VALUE OF THE OBJ. FUNCT.:
 ERROR IN NCONTR WITH INDIVIDUAL      21   ID= 2.10000000000000E+01
 NUMERICAL HESSIAN OF OBJ. FUNC. FOR COMPUTING CONDITIONAL ESTIMATE
 IS NON POSITIVE DEFINITE
 THETA=
  1.09E+00   1.37E+00   7.22E-03   4.27E+00   2.93E-04   1.29E+01  -3.41E+00  -1.76E-03

 NO. OF FUNCTION EVALUATIONS USED:      146
 NO. OF SIG. DIGITS UNREPORTABLE

 ETABAR IS THE ARITHMETIC MEAN OF THE ETA-ESTIMATES,
 AND THE P-VALUE IS GIVEN FOR THE NULL HYPOTHESIS THAT THE TRUE MEAN IS 0.

 ETABAR:        -4.8737E-02
 SE:             7.2974E-02
 N:                      75

 P VAL.:         5.0422E-01

 ETASHRINKSD(%)  1.0000E-10
 ETASHRINKVR(%)  1.0000E-10
 EBVSHRINKSD(%)  3.7956E-01
 EBVSHRINKVR(%)  7.5769E-01
 RELATIVEINF(%)  9.9242E+01
 EPSSHRINKSD(%)  1.3753E+01  1.3753E+01
 EPSSHRINKVR(%)  2.5615E+01  2.5615E+01


 TOTAL DATA POINTS NORMALLY DISTRIBUTED (N):         2801
 N*LOG(2PI) CONSTANT TO OBJECTIVE FUNCTION:    5147.8936630125763
 OBJECTIVE FUNCTION VALUE WITHOUT CONSTANT:    5268.6427252358035
 OBJECTIVE FUNCTION VALUE WITH CONSTANT:       10416.536388248380
 REPORTED OBJECTIVE FUNCTION DOES NOT CONTAIN CONSTANT

 TOTAL EFFECTIVE ETAS (NIND*NETA):                            75


 #TERE:
 Elapsed estimation  time in seconds:   371.84
 Elapsed postprocess time in seconds:     0.00

 ********************               FIRST ORDER CONDITIONAL ESTIMATION WITH INTERACTION              ********************
 #OBJT:**************                       MINIMUM VALUE OF OBJECTIVE FUNCTION                      ********************
 #OBJV:********************************************          5268.643       *********************************************

 ********************               FIRST ORDER CONDITIONAL ESTIMATION WITH INTERACTION              ********************
 ********************                             FINAL PARAMETER ESTIMATE                           ********************

 THETA - VECTOR OF FIXED EFFECTS PARAMETERS   *********
         TH 1      TH 2      TH 3      TH 4      TH 5      TH 6      TH 7      TH 8
         1.09E+00  1.37E+00  7.22E-03  4.27E+00  2.93E-04  1.29E+01 -3.41E+00 -1.76E-03

 OMEGA - COV MATRIX FOR RANDOM EFFECTS - ETAS  ********
         ETA1
 ETA1
+        3.68E-01

 SIGMA - COV MATRIX FOR RANDOM EFFECTS - EPSILONS  ****
         EPS1      EPS2
 EPS1
+        3.58E-01
 EPS2
+        0.00E+00  1.00E-13

 OMEGA - CORR MATRIX FOR RANDOM EFFECTS - ETAS  *******
         ETA1
 ETA1
+        6.06E-01

 SIGMA - CORR MATRIX FOR RANDOM EFFECTS - EPSILONS  ***
         EPS1      EPS2
 EPS1
+        5.98E-01
 EPS2
+        0.00E+00  3.16E-07
 Elapsed finaloutput time in seconds:     0.00
 #CPUT: Total CPU Time in Seconds,      366.008
